// SBML level 3 version 2

model biocrnpyler_652660()
  // model units - substance: mole, time: second, volume: litre, area: square_metre, length: metre, extent: mole

  // Compartments:
  compartment default = 1e-6;

  // Species:
  species dna_G_int in default = 0;
  species protein_RNAP in default = 0;
  species rna_T_int in default = 0;
  species complex_dna_G_int_protein_RNAP_ in default = 0;
  species protein_Ribo in default = 0;
  species protein_Int in default = 0;
  species complex_protein_Ribo_rna_T_int_ in default = 0;
  species dna_attP_attB in default = 0;
  species dna_attL_attR in default = 0;
  species complex_dna_attP_attB_protein_Int_4x_ in default = 0;
  species complex_dna_attL_attR_protein_Int_4x_ in default = 0;
  species protein_Exc in default = 0;
  species complex_complex_dna_attL_attR_protein_Int_4x__protein_Exc_4x_ in default = 0;
  species complex_complex_dna_attP_attB_protein_Int_4x__protein_Exc_4x_ in default = 0;
  species complex_protein_Exc_protein_Int_ in default = 0;
  species dna_G_exc in default = 0;
  species rna_T_exc in default = 0;
  species complex_dna_G_exc_protein_RNAP_ in default = 0;
  species complex_protein_Ribo_rna_T_exc_ in default = 0;
  species rna_T_A in default = 0;
  species complex_dna_attL_attR_protein_RNAP_ in default = 0;
  species protein_Y in default = 0;
  species complex_protein_Ribo_rna_T_A_ in default = 0;
  species protein_RNAase in default = 0;
  species complex_protein_RNAase_rna_T_int_ in default = 0;
  species complex_complex_protein_Ribo_rna_T_int__protein_RNAase_ in default = 0;
  species complex_protein_RNAase_rna_T_exc_ in default = 0;
  species complex_complex_protein_Ribo_rna_T_exc__protein_RNAase_ in default = 0;
  species complex_protein_RNAase_rna_T_A_ in default = 0;
  species complex_complex_protein_Ribo_rna_T_A__protein_RNAase_ in default = 0;

  // Parameters:
  kb_P_int_transcription_mm = 100;
  ku_P_int_transcription_mm = 1;
  ktx_P_int_transcription_mm = 0.29;
  kb_RBS1_translation_mm = 100;
  ku_RBS1_translation_mm = 1;
  ktl_RBS1_translation_mm = 0.008;
  a_i__ = 10;
  d_i__ = 1;
  k_int__ = 0.1;
  a_r__ = 0.033;
  d_r__ = 0.5;
  a_e1__ = 2;
  d_e1__ = 0.01;
  k_exc__ = 0.7;
  a_r1__ = 0.02;
  d_r1__ = 0.01;
  a_s2__ = 0.02;
  d_s2__ = 0.05;
  a_s1__ = 0.02;
  d_s1__ = 1;
  a_e2__ = 1;
  d_e2__ = 0.02;
  a_r2__ = 0.02;
  d_r2__ = 0.01;
  kb_P_exc_transcription_mm = 100;
  ku_P_exc_transcription_mm = 1;
  ktx_P_exc_transcription_mm = 0.292;
  kb_RBS2_translation_mm = 100;
  ku_RBS2_translation_mm = 1;
  ktl_RBS2_translation_mm = 0.0113;
  kb_P_A_transcription_mm = 80;
  ku_P_A_transcription_mm = 2;
  ktx_P_A_transcription_mm = 0.4;
  kb_RBS3_translation_mm = 80;
  ku_RBS3_translation_mm = 2;
  ktl_RBS3_translation_mm = 0.08;
  kb_rna_T_int_rna_degredation_mm = 20;
  ku_rna_T_int_rna_degredation_mm = 2;
  kdeg_rna_T_int_rna_degredation_mm = 0.005;
  kb_complex_protein_Ribo_rna_T_int__rna_degredation_mm = 20;
  ku_complex_protein_Ribo_rna_T_int__rna_degredation_mm = 2;
  kdeg_complex_protein_Ribo_rna_T_int__rna_degredation_mm = 0.005;
  kb_rna_T_exc_rna_degredation_mm = 20;
  ku_rna_T_exc_rna_degredation_mm = 2;
  kdeg_rna_T_exc_rna_degredation_mm = 0.005;
  kb_complex_protein_Ribo_rna_T_exc__rna_degredation_mm = 20;
  ku_complex_protein_Ribo_rna_T_exc__rna_degredation_mm = 2;
  kdeg_complex_protein_Ribo_rna_T_exc__rna_degredation_mm = 0.005;
  kb_rna_T_A_rna_degredation_mm = 10;
  ku_rna_T_A_rna_degredation_mm = 2;
  kdeg_rna_T_A_rna_degredation_mm = 0.001;
  kb_complex_protein_Ribo_rna_T_A__rna_degredation_mm = 10;
  ku_complex_protein_Ribo_rna_T_A__rna_degredation_mm = 2;
  kdeg_complex_protein_Ribo_rna_T_A__rna_degredation_mm = 0.005;

  // Reactions:
  r0: dna_G_int + protein_RNAP => complex_dna_G_int_protein_RNAP_; kb_P_int_transcription_mm*dna_G_int*protein_RNAP;
  r0rev: complex_dna_G_int_protein_RNAP_ => dna_G_int + protein_RNAP; ku_P_int_transcription_mm*complex_dna_G_int_protein_RNAP_;
  r1: complex_dna_G_int_protein_RNAP_ => dna_G_int + rna_T_int + protein_RNAP; ktx_P_int_transcription_mm*complex_dna_G_int_protein_RNAP_;
  r2: rna_T_int + protein_Ribo => complex_protein_Ribo_rna_T_int_; kb_RBS1_translation_mm*rna_T_int*protein_Ribo;
  r2rev: complex_protein_Ribo_rna_T_int_ => rna_T_int + protein_Ribo; ku_RBS1_translation_mm*complex_protein_Ribo_rna_T_int_;
  r3: complex_protein_Ribo_rna_T_int_ => rna_T_int + protein_Int + protein_Ribo; ktl_RBS1_translation_mm*complex_protein_Ribo_rna_T_int_;
  r4: 4 protein_Int + dna_attP_attB => complex_dna_attP_attB_protein_Int_4x_; a_i__*protein_Int^4*dna_attP_attB;
  r4rev: complex_dna_attP_attB_protein_Int_4x_ => 4 protein_Int + dna_attP_attB; d_i__*complex_dna_attP_attB_protein_Int_4x_;
  r5: complex_dna_attP_attB_protein_Int_4x_ => complex_dna_attL_attR_protein_Int_4x_; k_int__*complex_dna_attP_attB_protein_Int_4x_;
  r6: complex_dna_attL_attR_protein_Int_4x_ => 4 protein_Int + dna_attL_attR; a_r__*complex_dna_attL_attR_protein_Int_4x_;
  r6rev: 4 protein_Int + dna_attL_attR => complex_dna_attL_attR_protein_Int_4x_; d_r__*protein_Int^4*dna_attL_attR;
  r7: 4 protein_Exc + complex_dna_attL_attR_protein_Int_4x_ => complex_complex_dna_attL_attR_protein_Int_4x__protein_Exc_4x_; a_e1__*protein_Exc^4*complex_dna_attL_attR_protein_Int_4x_;
  r7rev: complex_complex_dna_attL_attR_protein_Int_4x__protein_Exc_4x_ => 4 protein_Exc + complex_dna_attL_attR_protein_Int_4x_; d_e1__*complex_complex_dna_attL_attR_protein_Int_4x__protein_Exc_4x_;
  r8: complex_complex_dna_attL_attR_protein_Int_4x__protein_Exc_4x_ => complex_complex_dna_attP_attB_protein_Int_4x__protein_Exc_4x_; k_exc__*complex_complex_dna_attL_attR_protein_Int_4x__protein_Exc_4x_;
  r9: complex_complex_dna_attP_attB_protein_Int_4x__protein_Exc_4x_ => 4 protein_Exc + 4 protein_Int + dna_attP_attB; a_r1__*complex_complex_dna_attP_attB_protein_Int_4x__protein_Exc_4x_;
  r9rev: 4 protein_Exc + 4 protein_Int + dna_attP_attB => complex_complex_dna_attP_attB_protein_Int_4x__protein_Exc_4x_; d_r1__*protein_Exc^4*protein_Int^4*dna_attP_attB;
  r10: 4 protein_Exc + complex_dna_attP_attB_protein_Int_4x_ => complex_complex_dna_attP_attB_protein_Int_4x__protein_Exc_4x_; a_s2__*protein_Exc^4*complex_dna_attP_attB_protein_Int_4x_;
  r10rev: complex_complex_dna_attP_attB_protein_Int_4x__protein_Exc_4x_ => 4 protein_Exc + complex_dna_attP_attB_protein_Int_4x_; d_s2__*complex_complex_dna_attP_attB_protein_Int_4x__protein_Exc_4x_;
  r11: protein_Int + protein_Exc => complex_protein_Exc_protein_Int_; a_s1__*protein_Int*protein_Exc;
  r11rev: complex_protein_Exc_protein_Int_ => protein_Int + protein_Exc; d_s1__*complex_protein_Exc_protein_Int_;
  r12: 4 complex_protein_Exc_protein_Int_ + dna_attL_attR => complex_complex_dna_attL_attR_protein_Int_4x__protein_Exc_4x_; a_e2__*complex_protein_Exc_protein_Int_^4*dna_attL_attR;
  r12rev: complex_complex_dna_attL_attR_protein_Int_4x__protein_Exc_4x_ => 4 complex_protein_Exc_protein_Int_ + dna_attL_attR; d_e2__*complex_complex_dna_attL_attR_protein_Int_4x__protein_Exc_4x_;
  r13: 4 complex_protein_Exc_protein_Int_ + dna_attP_attB => complex_complex_dna_attP_attB_protein_Int_4x__protein_Exc_4x_; a_r2__*complex_protein_Exc_protein_Int_^4*dna_attP_attB;
  r13rev: complex_complex_dna_attP_attB_protein_Int_4x__protein_Exc_4x_ => 4 complex_protein_Exc_protein_Int_ + dna_attP_attB; d_r2__*complex_complex_dna_attP_attB_protein_Int_4x__protein_Exc_4x_;
  r14: dna_G_exc + protein_RNAP => complex_dna_G_exc_protein_RNAP_; kb_P_exc_transcription_mm*dna_G_exc*protein_RNAP;
  r14rev: complex_dna_G_exc_protein_RNAP_ => dna_G_exc + protein_RNAP; ku_P_exc_transcription_mm*complex_dna_G_exc_protein_RNAP_;
  r15: complex_dna_G_exc_protein_RNAP_ => dna_G_exc + rna_T_exc + protein_RNAP; ktx_P_exc_transcription_mm*complex_dna_G_exc_protein_RNAP_;
  r16: rna_T_exc + protein_Ribo => complex_protein_Ribo_rna_T_exc_; kb_RBS2_translation_mm*rna_T_exc*protein_Ribo;
  r16rev: complex_protein_Ribo_rna_T_exc_ => rna_T_exc + protein_Ribo; ku_RBS2_translation_mm*complex_protein_Ribo_rna_T_exc_;
  r17: complex_protein_Ribo_rna_T_exc_ => rna_T_exc + protein_Exc + protein_Ribo; ktl_RBS2_translation_mm*complex_protein_Ribo_rna_T_exc_;
  r18: dna_attL_attR + protein_RNAP => complex_dna_attL_attR_protein_RNAP_; kb_P_A_transcription_mm*dna_attL_attR*protein_RNAP;
  r18rev: complex_dna_attL_attR_protein_RNAP_ => dna_attL_attR + protein_RNAP; ku_P_A_transcription_mm*complex_dna_attL_attR_protein_RNAP_;
  r19: complex_dna_attL_attR_protein_RNAP_ => dna_attL_attR + rna_T_A + protein_RNAP; ktx_P_A_transcription_mm*complex_dna_attL_attR_protein_RNAP_;
  r20: rna_T_A + protein_Ribo => complex_protein_Ribo_rna_T_A_; kb_RBS3_translation_mm*rna_T_A*protein_Ribo;
  r20rev: complex_protein_Ribo_rna_T_A_ => rna_T_A + protein_Ribo; ku_RBS3_translation_mm*complex_protein_Ribo_rna_T_A_;
  r21: complex_protein_Ribo_rna_T_A_ => rna_T_A + protein_Y + protein_Ribo; ktl_RBS3_translation_mm*complex_protein_Ribo_rna_T_A_;
  r22: rna_T_int + protein_RNAase => complex_protein_RNAase_rna_T_int_; kb_rna_T_int_rna_degredation_mm*rna_T_int*protein_RNAase;
  r22rev: complex_protein_RNAase_rna_T_int_ => rna_T_int + protein_RNAase; ku_rna_T_int_rna_degredation_mm*complex_protein_RNAase_rna_T_int_;
  r23: complex_protein_RNAase_rna_T_int_ => protein_RNAase; kdeg_rna_T_int_rna_degredation_mm*complex_protein_RNAase_rna_T_int_;
  r24: complex_protein_Ribo_rna_T_int_ + protein_RNAase => complex_complex_protein_Ribo_rna_T_int__protein_RNAase_; kb_complex_protein_Ribo_rna_T_int__rna_degredation_mm*complex_protein_Ribo_rna_T_int_*protein_RNAase;
  r24rev: complex_complex_protein_Ribo_rna_T_int__protein_RNAase_ => complex_protein_Ribo_rna_T_int_ + protein_RNAase; ku_complex_protein_Ribo_rna_T_int__rna_degredation_mm*complex_complex_protein_Ribo_rna_T_int__protein_RNAase_;
  r25: complex_complex_protein_Ribo_rna_T_int__protein_RNAase_ => protein_Ribo + protein_RNAase; kdeg_complex_protein_Ribo_rna_T_int__rna_degredation_mm*complex_complex_protein_Ribo_rna_T_int__protein_RNAase_;
  r26: rna_T_exc + protein_RNAase => complex_protein_RNAase_rna_T_exc_; kb_rna_T_exc_rna_degredation_mm*rna_T_exc*protein_RNAase;
  r26rev: complex_protein_RNAase_rna_T_exc_ => rna_T_exc + protein_RNAase; ku_rna_T_exc_rna_degredation_mm*complex_protein_RNAase_rna_T_exc_;
  r27: complex_protein_RNAase_rna_T_exc_ => protein_RNAase; kdeg_rna_T_exc_rna_degredation_mm*complex_protein_RNAase_rna_T_exc_;
  r28: complex_protein_Ribo_rna_T_exc_ + protein_RNAase => complex_complex_protein_Ribo_rna_T_exc__protein_RNAase_; kb_complex_protein_Ribo_rna_T_exc__rna_degredation_mm*complex_protein_Ribo_rna_T_exc_*protein_RNAase;
  r28rev: complex_complex_protein_Ribo_rna_T_exc__protein_RNAase_ => complex_protein_Ribo_rna_T_exc_ + protein_RNAase; ku_complex_protein_Ribo_rna_T_exc__rna_degredation_mm*complex_complex_protein_Ribo_rna_T_exc__protein_RNAase_;
  r29: complex_complex_protein_Ribo_rna_T_exc__protein_RNAase_ => protein_Ribo + protein_RNAase; kdeg_complex_protein_Ribo_rna_T_exc__rna_degredation_mm*complex_complex_protein_Ribo_rna_T_exc__protein_RNAase_;
  r30: rna_T_A + protein_RNAase => complex_protein_RNAase_rna_T_A_; kb_rna_T_A_rna_degredation_mm*rna_T_A*protein_RNAase;
  r30rev: complex_protein_RNAase_rna_T_A_ => rna_T_A + protein_RNAase; ku_rna_T_A_rna_degredation_mm*complex_protein_RNAase_rna_T_A_;
  r31: complex_protein_RNAase_rna_T_A_ => protein_RNAase; kdeg_rna_T_A_rna_degredation_mm*complex_protein_RNAase_rna_T_A_;
  r32: complex_protein_Ribo_rna_T_A_ + protein_RNAase => complex_complex_protein_Ribo_rna_T_A__protein_RNAase_; kb_complex_protein_Ribo_rna_T_A__rna_degredation_mm*complex_protein_Ribo_rna_T_A_*protein_RNAase;
  r32rev: complex_complex_protein_Ribo_rna_T_A__protein_RNAase_ => complex_protein_Ribo_rna_T_A_ + protein_RNAase; ku_complex_protein_Ribo_rna_T_A__rna_degredation_mm*complex_complex_protein_Ribo_rna_T_A__protein_RNAase_;
  r33: complex_complex_protein_Ribo_rna_T_A__protein_RNAase_ => protein_Ribo + protein_RNAase; kdeg_complex_protein_Ribo_rna_T_A__rna_degredation_mm*complex_complex_protein_Ribo_rna_T_A__protein_RNAase_;

  // Unit definitions:
  unit square_metre = metre^2;
end
