// SBML level 3 version 2

model biocrnpyler_935223()
  // model units - substance: mole, time: second, volume: litre, area: square_metre, length: metre, extent: mole

  // Compartments:
  compartment default = 1e-6;

  // Species:
  species dna_G_int in default = 0;
  species protein_RNAP in default = 0;
  species rna_T_int in default = 0;
  species complex_dna_G_int_protein_RNAP_ in default = 0;
  species protein_Ribo in default = 0;
  species protein_Int in default = 0;
  species complex_protein_Ribo_rna_T_int_ in default = 0;
  species dna_attP_attB in default = 0;
  species dna_attL_attR in default = 0;
  species complex_dna_attP_attB_protein_Int_2x_ in default = 0;
  species complex_dna_attL_attR_protein_Int_2x_ in default = 0;
  species rna_T_A in default = 0;
  species complex_dna_attL_attR_protein_RNAP_ in default = 0;
  species protein_Y in default = 0;
  species complex_protein_Ribo_rna_T_A_ in default = 0;
  species protein_RNAase in default = 0;
  species complex_protein_RNAase_rna_T_int_ in default = 0;
  species complex_complex_protein_Ribo_rna_T_int__protein_RNAase_ in default = 0;
  species complex_protein_RNAase_rna_T_A_ in default = 0;
  species complex_complex_protein_Ribo_rna_T_A__protein_RNAase_ in default = 0;

  // Parameters:
  kb_P_int_transcription_mm = 100;
  ku_P_int_transcription_mm = 1;
  ktx_P_int_transcription_mm = 0.25;
  kb_RBS1_translation_mm = 100;
  ku_RBS1_translation_mm = 1;
  ktl_RBS1_translation_mm = 0.013;
  a_i__ = 10;
  d_i__ = 1;
  k_int__ = 0.1;
  a_r__ = 0.033;
  d_r__ = 0.5;
  kb_P_A_transcription_mm = 80;
  ku_P_A_transcription_mm = 2;
  ktx_P_A_transcription_mm = 0.4;
  kb_RBS2_translation_mm = 80;
  ku_RBS2_translation_mm = 2;
  ktl_RBS2_translation_mm = 0.05;
  kb_rna_T_int_rna_degredation_mm = 20;
  ku_rna_T_int_rna_degredation_mm = 2;
  kdeg_rna_T_int_rna_degredation_mm = 0.005;
  kb_complex_protein_Ribo_rna_T_int__rna_degredation_mm = 20;
  ku_complex_protein_Ribo_rna_T_int__rna_degredation_mm = 2;
  kdeg_complex_protein_Ribo_rna_T_int__rna_degredation_mm = 0.005;
  kb_rna_T_A_rna_degredation_mm = 10;
  ku_rna_T_A_rna_degredation_mm = 2;
  kdeg_rna_T_A_rna_degredation_mm = 0.001;
  kb_complex_protein_Ribo_rna_T_A__rna_degredation_mm = 10;
  ku_complex_protein_Ribo_rna_T_A__rna_degredation_mm = 2;
  kdeg_complex_protein_Ribo_rna_T_A__rna_degredation_mm = 0.005;

  // Reactions:
  r0: dna_G_int + protein_RNAP => complex_dna_G_int_protein_RNAP_; kb_P_int_transcription_mm*dna_G_int*protein_RNAP;
  r0rev: complex_dna_G_int_protein_RNAP_ => dna_G_int + protein_RNAP; ku_P_int_transcription_mm*complex_dna_G_int_protein_RNAP_;
  r1: complex_dna_G_int_protein_RNAP_ => dna_G_int + rna_T_int + protein_RNAP; ktx_P_int_transcription_mm*complex_dna_G_int_protein_RNAP_;
  r2: rna_T_int + protein_Ribo => complex_protein_Ribo_rna_T_int_; kb_RBS1_translation_mm*rna_T_int*protein_Ribo;
  r2rev: complex_protein_Ribo_rna_T_int_ => rna_T_int + protein_Ribo; ku_RBS1_translation_mm*complex_protein_Ribo_rna_T_int_;
  r3: complex_protein_Ribo_rna_T_int_ => rna_T_int + protein_Int + protein_Ribo; ktl_RBS1_translation_mm*complex_protein_Ribo_rna_T_int_;
  r4: 2 protein_Int + dna_attP_attB => complex_dna_attP_attB_protein_Int_2x_; a_i__*protein_Int^2*dna_attP_attB;
  r4rev: complex_dna_attP_attB_protein_Int_2x_ => 2 protein_Int + dna_attP_attB; d_i__*complex_dna_attP_attB_protein_Int_2x_;
  r5: complex_dna_attP_attB_protein_Int_2x_ => complex_dna_attL_attR_protein_Int_2x_; k_int__*complex_dna_attP_attB_protein_Int_2x_;
  r6: complex_dna_attL_attR_protein_Int_2x_ => 2 protein_Int + dna_attL_attR; a_r__*complex_dna_attL_attR_protein_Int_2x_;
  r6rev: 2 protein_Int + dna_attL_attR => complex_dna_attL_attR_protein_Int_2x_; d_r__*protein_Int^2*dna_attL_attR;
  r7: dna_attL_attR + protein_RNAP => complex_dna_attL_attR_protein_RNAP_; kb_P_A_transcription_mm*dna_attL_attR*protein_RNAP;
  r7rev: complex_dna_attL_attR_protein_RNAP_ => dna_attL_attR + protein_RNAP; ku_P_A_transcription_mm*complex_dna_attL_attR_protein_RNAP_;
  r8: complex_dna_attL_attR_protein_RNAP_ => dna_attL_attR + rna_T_A + protein_RNAP; ktx_P_A_transcription_mm*complex_dna_attL_attR_protein_RNAP_;
  r9: rna_T_A + protein_Ribo => complex_protein_Ribo_rna_T_A_; kb_RBS2_translation_mm*rna_T_A*protein_Ribo;
  r9rev: complex_protein_Ribo_rna_T_A_ => rna_T_A + protein_Ribo; ku_RBS2_translation_mm*complex_protein_Ribo_rna_T_A_;
  r10: complex_protein_Ribo_rna_T_A_ => rna_T_A + protein_Y + protein_Ribo; ktl_RBS2_translation_mm*complex_protein_Ribo_rna_T_A_;
  r11: rna_T_int + protein_RNAase => complex_protein_RNAase_rna_T_int_; kb_rna_T_int_rna_degredation_mm*rna_T_int*protein_RNAase;
  r11rev: complex_protein_RNAase_rna_T_int_ => rna_T_int + protein_RNAase; ku_rna_T_int_rna_degredation_mm*complex_protein_RNAase_rna_T_int_;
  r12: complex_protein_RNAase_rna_T_int_ => protein_RNAase; kdeg_rna_T_int_rna_degredation_mm*complex_protein_RNAase_rna_T_int_;
  r13: complex_protein_Ribo_rna_T_int_ + protein_RNAase => complex_complex_protein_Ribo_rna_T_int__protein_RNAase_; kb_complex_protein_Ribo_rna_T_int__rna_degredation_mm*complex_protein_Ribo_rna_T_int_*protein_RNAase;
  r13rev: complex_complex_protein_Ribo_rna_T_int__protein_RNAase_ => complex_protein_Ribo_rna_T_int_ + protein_RNAase; ku_complex_protein_Ribo_rna_T_int__rna_degredation_mm*complex_complex_protein_Ribo_rna_T_int__protein_RNAase_;
  r14: complex_complex_protein_Ribo_rna_T_int__protein_RNAase_ => protein_Ribo + protein_RNAase; kdeg_complex_protein_Ribo_rna_T_int__rna_degredation_mm*complex_complex_protein_Ribo_rna_T_int__protein_RNAase_;
  r15: rna_T_A + protein_RNAase => complex_protein_RNAase_rna_T_A_; kb_rna_T_A_rna_degredation_mm*rna_T_A*protein_RNAase;
  r15rev: complex_protein_RNAase_rna_T_A_ => rna_T_A + protein_RNAase; ku_rna_T_A_rna_degredation_mm*complex_protein_RNAase_rna_T_A_;
  r16: complex_protein_RNAase_rna_T_A_ => protein_RNAase; kdeg_rna_T_A_rna_degredation_mm*complex_protein_RNAase_rna_T_A_;
  r17: complex_protein_Ribo_rna_T_A_ + protein_RNAase => complex_complex_protein_Ribo_rna_T_A__protein_RNAase_; kb_complex_protein_Ribo_rna_T_A__rna_degredation_mm*complex_protein_Ribo_rna_T_A_*protein_RNAase;
  r17rev: complex_complex_protein_Ribo_rna_T_A__protein_RNAase_ => complex_protein_Ribo_rna_T_A_ + protein_RNAase; ku_complex_protein_Ribo_rna_T_A__rna_degredation_mm*complex_complex_protein_Ribo_rna_T_A__protein_RNAase_;
  r18: complex_complex_protein_Ribo_rna_T_A__protein_RNAase_ => protein_Ribo + protein_RNAase; kdeg_complex_protein_Ribo_rna_T_A__rna_degredation_mm*complex_complex_protein_Ribo_rna_T_A__protein_RNAase_;

  // Unit definitions:
  unit square_metre = metre^2;
end
