// SBML level 3 version 2

model autoreduce_709002()
  // model units - substance: mole, time: second, volume: litre, area: square_metre, length: metre, extent: mole

  // Compartments:
  compartment default = 1;

  // Species:
  species G_I in default = 1;
  species Int in default = 0;
  species A in default = 0;
  species Exc in default = 0;
  species C_IE in default = 0;
  species G_E in default = 0.5;
  species YFP in default = 0;
  species G_tot in default = 0;

  // Parameters:
  a_e2 = 0.05;
  a_i = 0.3;
  a_r = 1;
  a_r1 = 0.02;
  a_r2 = 0.02;
  a_s1 = 0.02;
  d_e2 = 0.02;
  d_i = 500;
  d_r = 0.001;
  d_r1 = 0.0007;
  d_r2 = 0.01;
  d_s1 = 10;
  k = 10;
  k_e = 0.3;
  k_exc = 0.05;
  k_i = 0.2;
  k_int = 0.5;

  // Reactions:
  r0: => G_I; 0;
  r1: => Int; 1*(4*A*C_IE^4*Exc^4*Int^4*a_e2*d_i*d_r1*k_exc + 4*A*C_IE^4*Exc^4*Int^4*a_e2*d_r1*k_exc*k_int + 4*A*C_IE^4*Int^4*a_e2*a_i*a_r1*k_exc + 4*A*C_IE^4*a_e2*a_r1*d_i*k_exc + 4*A*C_IE^4*a_e2*a_r1*k_exc*k_int + 1*C_IE^5*a_r2*d_e2*d_i*d_s1 + 1*C_IE^5*a_r2*d_e2*d_s1*k_int + 1*C_IE^5*a_r2*d_i*d_s1*k_exc + 1*C_IE^5*a_r2*d_s1*k_exc*k_int - 1*C_IE^4*Exc*Int*a_r2*a_s1*d_e2*d_i - 1*C_IE^4*Exc*Int*a_r2*a_s1*d_e2*k_int - 1*C_IE^4*Exc*Int*a_r2*a_s1*d_i*k_exc - 1*C_IE^4*Exc*Int*a_r2*a_s1*k_exc*k_int + 1*C_IE^4*G_I*a_r2*d_e2*d_i*k_i + 1*C_IE^4*G_I*a_r2*d_e2*k_i*k_int + 1*C_IE^4*G_I*a_r2*d_i*k_exc*k_i + 1*C_IE^4*G_I*a_r2*k_exc*k_i*k_int + 4*C_IE^4*G_tot*a_r1*a_r2*d_e2*d_i + 4*C_IE^4*G_tot*a_r1*a_r2*d_e2*k_int + 4*C_IE^4*G_tot*a_r1*a_r2*d_i*k_exc + 4*C_IE^4*G_tot*a_r1*a_r2*k_exc*k_int + 1*C_IE*Exc^4*Int^4*d_e2*d_i*d_r1*d_s1 + 1*C_IE*Exc^4*Int^4*d_e2*d_r1*d_s1*k_int + 1*C_IE*Exc^4*Int^4*d_i*d_r1*d_s1*k_exc + 1*C_IE*Exc^4*Int^4*d_r1*d_s1*k_exc*k_int + 1*C_IE*Int^4*a_i*a_r1*d_e2*d_s1 + 1*C_IE*Int^4*a_i*a_r1*d_s1*k_exc + 1*C_IE*Int^4*a_i*d_e2*d_r2*d_s1 + 1*C_IE*Int^4*a_i*d_r2*d_s1*k_exc + 1*C_IE*a_r1*d_e2*d_i*d_s1 + 1*C_IE*a_r1*d_e2*d_s1*k_int + 1*C_IE*a_r1*d_i*d_s1*k_exc + 1*C_IE*a_r1*d_s1*k_exc*k_int + 1*C_IE*d_e2*d_i*d_r2*d_s1 + 1*C_IE*d_e2*d_r2*d_s1*k_int + 1*C_IE*d_i*d_r2*d_s1*k_exc + 1*C_IE*d_r2*d_s1*k_exc*k_int - 1*Exc^5*Int^5*a_s1*d_e2*d_i*d_r1 - 1*Exc^5*Int^5*a_s1*d_e2*d_r1*k_int - 1*Exc^5*Int^5*a_s1*d_i*d_r1*k_exc - 1*Exc^5*Int^5*a_s1*d_r1*k_exc*k_int + 1*Exc^4*G_I*Int^4*d_e2*d_i*d_r1*k_i + 1*Exc^4*G_I*Int^4*d_e2*d_r1*k_i*k_int + 1*Exc^4*G_I*Int^4*d_i*d_r1*k_exc*k_i + 1*Exc^4*G_I*Int^4*d_r1*k_exc*k_i*k_int - 4*Exc^4*G_tot*Int^4*d_e2*d_i*d_r1*d_r2 - 4*Exc^4*G_tot*Int^4*d_e2*d_r1*d_r2*k_int - 4*Exc^4*G_tot*Int^4*d_i*d_r1*d_r2*k_exc - 4*Exc^4*G_tot*Int^4*d_r1*d_r2*k_exc*k_int - 1*Exc*Int^5*a_i*a_r1*a_s1*d_e2 - 1*Exc*Int^5*a_i*a_r1*a_s1*k_exc - 1*Exc*Int^5*a_i*a_s1*d_e2*d_r2 - 1*Exc*Int^5*a_i*a_s1*d_r2*k_exc - 1*Exc*Int*a_r1*a_s1*d_e2*d_i - 1*Exc*Int*a_r1*a_s1*d_e2*k_int - 1*Exc*Int*a_r1*a_s1*d_i*k_exc - 1*Exc*Int*a_r1*a_s1*k_exc*k_int - 1*Exc*Int*a_s1*d_e2*d_i*d_r2 - 1*Exc*Int*a_s1*d_e2*d_r2*k_int - 1*Exc*Int*a_s1*d_i*d_r2*k_exc - 1*Exc*Int*a_s1*d_r2*k_exc*k_int + 1*G_I*Int^4*a_i*a_r1*d_e2*k_i + 1*G_I*Int^4*a_i*a_r1*k_exc*k_i + 1*G_I*Int^4*a_i*d_e2*d_r2*k_i + 1*G_I*Int^4*a_i*d_r2*k_exc*k_i + 1*G_I*a_r1*d_e2*d_i*k_i + 1*G_I*a_r1*d_e2*k_i*k_int + 1*G_I*a_r1*d_i*k_exc*k_i + 1*G_I*a_r1*k_exc*k_i*k_int + 1*G_I*d_e2*d_i*d_r2*k_i + 1*G_I*d_e2*d_r2*k_i*k_int + 1*G_I*d_i*d_r2*k_exc*k_i + 1*G_I*d_r2*k_exc*k_i*k_int)/(C_IE^4*a_r2*d_e2*d_i + C_IE^4*a_r2*d_e2*k_int + C_IE^4*a_r2*d_i*k_exc + C_IE^4*a_r2*k_exc*k_int + Exc^4*Int^4*d_e2*d_i*d_r1 + Exc^4*Int^4*d_e2*d_r1*k_int + Exc^4*Int^4*d_i*d_r1*k_exc + Exc^4*Int^4*d_r1*k_exc*k_int + Int^4*a_i*a_r1*d_e2 + Int^4*a_i*a_r1*k_exc + Int^4*a_i*d_e2*d_r2 + Int^4*a_i*d_r2*k_exc + a_r1*d_e2*d_i + a_r1*d_e2*k_int + a_r1*d_i*k_exc + a_r1*k_exc*k_int + d_e2*d_i*d_r2 + d_e2*d_r2*k_int + d_i*d_r2*k_exc + d_r2*k_exc*k_int);  // modifiers: G_I, Exc, A, C_IE, G_tot
  r2: => A; (-A*C_IE^8*a_e2*a_r2*d_i*k_exc - A*C_IE^8*a_e2*a_r2*k_exc*k_int - A*C_IE^4*Exc^4*Int^4*a_e2*d_i*d_r1*k_exc - A*C_IE^4*Exc^4*Int^4*a_e2*d_r1*k_exc*k_int - A*C_IE^4*Int^4*a_e2*a_i*a_r1*k_exc - A*C_IE^4*Int^4*a_e2*a_i*d_r2*k_exc - A*C_IE^4*Int^4*a_e2*a_i*k_exc*k_int - A*C_IE^4*a_e2*a_r1*d_i*k_exc - A*C_IE^4*a_e2*a_r1*k_exc*k_int - A*C_IE^4*a_e2*d_i*d_r2*k_exc - A*C_IE^4*a_e2*d_r2*k_exc*k_int + G_tot*Int^4*a_i*a_r1*d_e2*k_int + G_tot*Int^4*a_i*a_r1*k_exc*k_int + G_tot*Int^4*a_i*d_e2*d_r2*k_int + G_tot*Int^4*a_i*d_r2*k_exc*k_int)/(C_IE^4*a_r2*d_e2*d_i + C_IE^4*a_r2*d_e2*k_int + C_IE^4*a_r2*d_i*k_exc + C_IE^4*a_r2*k_exc*k_int + Exc^4*Int^4*d_e2*d_i*d_r1 + Exc^4*Int^4*d_e2*d_r1*k_int + Exc^4*Int^4*d_i*d_r1*k_exc + Exc^4*Int^4*d_r1*k_exc*k_int + Int^4*a_i*a_r1*d_e2 + Int^4*a_i*a_r1*k_exc + Int^4*a_i*d_e2*d_r2 + Int^4*a_i*d_r2*k_exc + a_r1*d_e2*d_i + a_r1*d_e2*k_int + a_r1*d_i*k_exc + a_r1*k_exc*k_int + d_e2*d_i*d_r2 + d_e2*d_r2*k_int + d_i*d_r2*k_exc + d_r2*k_exc*k_int);  // modifiers: Exc, Int, C_IE, G_tot
  r3: => Exc; (-4*Exc^4*Int^4*d_r1*(d_i + k_int)*(-A*C_IE^4*Int^4*a_e2*a_i*k_exc - A*C_IE^4*a_e2*d_i*k_exc - A*C_IE^4*a_e2*k_exc*k_int - C_IE^4*G_tot*a_r2*d_e2*d_i - C_IE^4*G_tot*a_r2*d_e2*k_int - C_IE^4*G_tot*a_r2*d_i*k_exc - C_IE^4*G_tot*a_r2*k_exc*k_int - Exc^4*G_tot*Int^4*d_e2*d_i*d_r1 - Exc^4*G_tot*Int^4*d_e2*d_r1*k_int - Exc^4*G_tot*Int^4*d_i*d_r1*k_exc - Exc^4*G_tot*Int^4*d_r1*k_exc*k_int + G_tot*(C_IE^4*a_r2*d_e2*d_i + C_IE^4*a_r2*d_e2*k_int + C_IE^4*a_r2*d_i*k_exc + C_IE^4*a_r2*k_exc*k_int + Exc^4*Int^4*d_e2*d_i*d_r1 + Exc^4*Int^4*d_e2*d_r1*k_int + Exc^4*Int^4*d_i*d_r1*k_exc + Exc^4*Int^4*d_r1*k_exc*k_int + Int^4*a_i*a_r1*d_e2 + Int^4*a_i*a_r1*k_exc + Int^4*a_i*d_e2*d_r2 + Int^4*a_i*d_r2*k_exc + a_r1*d_e2*d_i + a_r1*d_e2*k_int + a_r1*d_i*k_exc + a_r1*k_exc*k_int + d_e2*d_i*d_r2 + d_e2*d_r2*k_int + d_i*d_r2*k_exc + d_r2*k_exc*k_int)) + (4*a_r1*(A*C_IE^4*Int^4*a_e2*a_i*k_exc + A*C_IE^4*a_e2*d_i*k_exc + A*C_IE^4*a_e2*k_exc*k_int + C_IE^4*G_tot*a_r2*d_e2*d_i + C_IE^4*G_tot*a_r2*d_e2*k_int + C_IE^4*G_tot*a_r2*d_i*k_exc + C_IE^4*G_tot*a_r2*k_exc*k_int + Exc^4*G_tot*Int^4*d_e2*d_i*d_r1 + Exc^4*G_tot*Int^4*d_e2*d_r1*k_int + Exc^4*G_tot*Int^4*d_i*d_r1*k_exc + Exc^4*G_tot*Int^4*d_r1*k_exc*k_int) + (C_IE*d_s1 - Exc*Int*a_s1 + G_E*k_e)*(C_IE^4*a_r2*d_e2*d_i + C_IE^4*a_r2*d_e2*k_int + C_IE^4*a_r2*d_i*k_exc + C_IE^4*a_r2*k_exc*k_int + Exc^4*Int^4*d_e2*d_i*d_r1 + Exc^4*Int^4*d_e2*d_r1*k_int + Exc^4*Int^4*d_i*d_r1*k_exc + Exc^4*Int^4*d_r1*k_exc*k_int + Int^4*a_i*a_r1*d_e2 + Int^4*a_i*a_r1*k_exc + Int^4*a_i*d_e2*d_r2 + Int^4*a_i*d_r2*k_exc + a_r1*d_e2*d_i + a_r1*d_e2*k_int + a_r1*d_i*k_exc + a_r1*k_exc*k_int + d_e2*d_i*d_r2 + d_e2*d_r2*k_int + d_i*d_r2*k_exc + d_r2*k_exc*k_int))*(Int^4*a_i + d_i + k_int))/((Int^4*a_i + d_i + k_int)*(C_IE^4*a_r2*d_e2*d_i + C_IE^4*a_r2*d_e2*k_int + C_IE^4*a_r2*d_i*k_exc + C_IE^4*a_r2*k_exc*k_int + Exc^4*Int^4*d_e2*d_i*d_r1 + Exc^4*Int^4*d_e2*d_r1*k_int + Exc^4*Int^4*d_i*d_r1*k_exc + Exc^4*Int^4*d_r1*k_exc*k_int + Int^4*a_i*a_r1*d_e2 + Int^4*a_i*a_r1*k_exc + Int^4*a_i*d_e2*d_r2 + Int^4*a_i*d_r2*k_exc + a_r1*d_e2*d_i + a_r1*d_e2*k_int + a_r1*d_i*k_exc + a_r1*k_exc*k_int + d_e2*d_i*d_r2 + d_e2*d_r2*k_int + d_i*d_r2*k_exc + d_r2*k_exc*k_int));  // modifiers: Int, A, C_IE, G_tot, G_E
  r4: => C_IE; 1*(-4*A*C_IE^4*Exc^4*Int^4*a_e2*d_i*d_r1*k_exc - 4*A*C_IE^4*Exc^4*Int^4*a_e2*d_r1*k_exc*k_int - 4*A*C_IE^4*Int^4*a_e2*a_i*a_r1*k_exc - 4*A*C_IE^4*a_e2*a_r1*d_i*k_exc - 4*A*C_IE^4*a_e2*a_r1*k_exc*k_int - 1*C_IE^5*a_r2*d_e2*d_i*d_s1 - 1*C_IE^5*a_r2*d_e2*d_s1*k_int - 1*C_IE^5*a_r2*d_i*d_s1*k_exc - 1*C_IE^5*a_r2*d_s1*k_exc*k_int + 1*C_IE^4*Exc*Int*a_r2*a_s1*d_e2*d_i + 1*C_IE^4*Exc*Int*a_r2*a_s1*d_e2*k_int + 1*C_IE^4*Exc*Int*a_r2*a_s1*d_i*k_exc + 1*C_IE^4*Exc*Int*a_r2*a_s1*k_exc*k_int - 4*C_IE^4*G_tot*a_r1*a_r2*d_e2*d_i - 4*C_IE^4*G_tot*a_r1*a_r2*d_e2*k_int - 4*C_IE^4*G_tot*a_r1*a_r2*d_i*k_exc - 4*C_IE^4*G_tot*a_r1*a_r2*k_exc*k_int - 1*C_IE*Exc^4*Int^4*d_e2*d_i*d_r1*d_s1 - 1*C_IE*Exc^4*Int^4*d_e2*d_r1*d_s1*k_int - 1*C_IE*Exc^4*Int^4*d_i*d_r1*d_s1*k_exc - 1*C_IE*Exc^4*Int^4*d_r1*d_s1*k_exc*k_int - 1*C_IE*Int^4*a_i*a_r1*d_e2*d_s1 - 1*C_IE*Int^4*a_i*a_r1*d_s1*k_exc - 1*C_IE*Int^4*a_i*d_e2*d_r2*d_s1 - 1*C_IE*Int^4*a_i*d_r2*d_s1*k_exc - 1*C_IE*a_r1*d_e2*d_i*d_s1 - 1*C_IE*a_r1*d_e2*d_s1*k_int - 1*C_IE*a_r1*d_i*d_s1*k_exc - 1*C_IE*a_r1*d_s1*k_exc*k_int - 1*C_IE*d_e2*d_i*d_r2*d_s1 - 1*C_IE*d_e2*d_r2*d_s1*k_int - 1*C_IE*d_i*d_r2*d_s1*k_exc - 1*C_IE*d_r2*d_s1*k_exc*k_int + 1*Exc^5*Int^5*a_s1*d_e2*d_i*d_r1 + 1*Exc^5*Int^5*a_s1*d_e2*d_r1*k_int + 1*Exc^5*Int^5*a_s1*d_i*d_r1*k_exc + 1*Exc^5*Int^5*a_s1*d_r1*k_exc*k_int + 4*Exc^4*G_tot*Int^4*d_e2*d_i*d_r1*d_r2 + 4*Exc^4*G_tot*Int^4*d_e2*d_r1*d_r2*k_int + 4*Exc^4*G_tot*Int^4*d_i*d_r1*d_r2*k_exc + 4*Exc^4*G_tot*Int^4*d_r1*d_r2*k_exc*k_int + 1*Exc*Int^5*a_i*a_r1*a_s1*d_e2 + 1*Exc*Int^5*a_i*a_r1*a_s1*k_exc + 1*Exc*Int^5*a_i*a_s1*d_e2*d_r2 + 1*Exc*Int^5*a_i*a_s1*d_r2*k_exc + 1*Exc*Int*a_r1*a_s1*d_e2*d_i + 1*Exc*Int*a_r1*a_s1*d_e2*k_int + 1*Exc*Int*a_r1*a_s1*d_i*k_exc + 1*Exc*Int*a_r1*a_s1*k_exc*k_int + 1*Exc*Int*a_s1*d_e2*d_i*d_r2 + 1*Exc*Int*a_s1*d_e2*d_r2*k_int + 1*Exc*Int*a_s1*d_i*d_r2*k_exc + 1*Exc*Int*a_s1*d_r2*k_exc*k_int)/(C_IE^4*a_r2*d_e2*d_i + C_IE^4*a_r2*d_e2*k_int + C_IE^4*a_r2*d_i*k_exc + C_IE^4*a_r2*k_exc*k_int + Exc^4*Int^4*d_e2*d_i*d_r1 + Exc^4*Int^4*d_e2*d_r1*k_int + Exc^4*Int^4*d_i*d_r1*k_exc + Exc^4*Int^4*d_r1*k_exc*k_int + Int^4*a_i*a_r1*d_e2 + Int^4*a_i*a_r1*k_exc + Int^4*a_i*d_e2*d_r2 + Int^4*a_i*d_r2*k_exc + a_r1*d_e2*d_i + a_r1*d_e2*k_int + a_r1*d_i*k_exc + a_r1*k_exc*k_int + d_e2*d_i*d_r2 + d_e2*d_r2*k_int + d_i*d_r2*k_exc + d_r2*k_exc*k_int);  // modifiers: Exc, Int, A, G_tot
  r5: => G_E; 0;
  r6: => YFP; A*k;  // modifiers: A
  r7: => G_tot; 0;

  // Unit definitions:
  unit square_metre = metre^2;
end
