// SBML level 3 version 2

model biocrnpyler_323380()
  // model units - substance: mole, time: second, volume: litre, area: square_metre, length: metre, extent: mole

  // Compartments:
  compartment default = 1e-6;

  // Species:
  species dna_G_int in default = 0;
  species protein_Int in default = 0;
  species dna_attP_attB in default = 0;
  species dna_attL_attR in default = 0;
  species complex_dna_attP_attB_protein_Int_4x_ in default = 0;
  species complex_dna_attL_attR_protein_Int_4x_ in default = 0;
  species protein_Exc in default = 0;
  species complex_complex_dna_attL_attR_protein_Int_4x__protein_Exc_4x_ in default = 0;
  species complex_complex_dna_attP_attB_protein_Int_4x__protein_Exc_4x_ in default = 0;
  species complex_protein_Exc_protein_Int_ in default = 0;
  species dna_G_exc in default = 0;
  species protein_Y in default = 0;

  // Parameters:
  kexpress_P_int_gene_expression = 1;
  a_i__ = 2;
  d_i__ = 50;
  k_int__ = 5;
  a_r__ = 10000;
  d_r__ = 0.0001;
  k_exc__ = 5;
  a_r1__ = 10;
  d_r1__ = 10000;
  a_s1__ = 10;
  d_s1__ = 1;
  a_e2__ = 50;
  d_e2__ = 2;
  a_r2__ = 10;
  d_r2__ = 1;
  kexpress_P_exc_gene_expression = 1;
  kexpress_P_A_gene_expression = 1;

  // Reactions:
  r0: dna_G_int => dna_G_int + protein_Int; kexpress_P_int_gene_expression*dna_G_int;
  r1: 4 protein_Int + dna_attP_attB => complex_dna_attP_attB_protein_Int_4x_; a_i__*protein_Int^4*dna_attP_attB;
  r1rev: complex_dna_attP_attB_protein_Int_4x_ => 4 protein_Int + dna_attP_attB; d_i__*complex_dna_attP_attB_protein_Int_4x_;
  r2: complex_dna_attP_attB_protein_Int_4x_ => complex_dna_attL_attR_protein_Int_4x_; k_int__*complex_dna_attP_attB_protein_Int_4x_;
  r3: complex_dna_attL_attR_protein_Int_4x_ => 4 protein_Int + dna_attL_attR; a_r__*complex_dna_attL_attR_protein_Int_4x_;
  r3rev: 4 protein_Int + dna_attL_attR => complex_dna_attL_attR_protein_Int_4x_; d_r__*protein_Int^4*dna_attL_attR;
  r4: complex_complex_dna_attL_attR_protein_Int_4x__protein_Exc_4x_ => complex_complex_dna_attP_attB_protein_Int_4x__protein_Exc_4x_; k_exc__*complex_complex_dna_attL_attR_protein_Int_4x__protein_Exc_4x_;
  r5: complex_complex_dna_attP_attB_protein_Int_4x__protein_Exc_4x_ => 4 protein_Exc + 4 protein_Int + dna_attP_attB; a_r1__*complex_complex_dna_attP_attB_protein_Int_4x__protein_Exc_4x_;
  r5rev: 4 protein_Exc + 4 protein_Int + dna_attP_attB => complex_complex_dna_attP_attB_protein_Int_4x__protein_Exc_4x_; d_r1__*protein_Exc^4*protein_Int^4*dna_attP_attB;
  r6: protein_Int + protein_Exc => complex_protein_Exc_protein_Int_; a_s1__*protein_Int*protein_Exc;
  r6rev: complex_protein_Exc_protein_Int_ => protein_Int + protein_Exc; d_s1__*complex_protein_Exc_protein_Int_;
  r7: 4 complex_protein_Exc_protein_Int_ + dna_attL_attR => complex_complex_dna_attL_attR_protein_Int_4x__protein_Exc_4x_; a_e2__*complex_protein_Exc_protein_Int_^4*dna_attL_attR;
  r7rev: complex_complex_dna_attL_attR_protein_Int_4x__protein_Exc_4x_ => 4 complex_protein_Exc_protein_Int_ + dna_attL_attR; d_e2__*complex_complex_dna_attL_attR_protein_Int_4x__protein_Exc_4x_;
  r8: 4 complex_protein_Exc_protein_Int_ + dna_attP_attB => complex_complex_dna_attP_attB_protein_Int_4x__protein_Exc_4x_; a_r2__*complex_protein_Exc_protein_Int_^4*dna_attP_attB;
  r8rev: complex_complex_dna_attP_attB_protein_Int_4x__protein_Exc_4x_ => 4 complex_protein_Exc_protein_Int_ + dna_attP_attB; d_r2__*complex_complex_dna_attP_attB_protein_Int_4x__protein_Exc_4x_;
  r9: dna_G_exc => dna_G_exc + protein_Exc; kexpress_P_exc_gene_expression*dna_G_exc;
  r10: dna_attL_attR => dna_attL_attR + protein_Y; kexpress_P_A_gene_expression*dna_attL_attR;

  // Unit definitions:
  unit square_metre = metre^2;
end
