// SBML level 3 version 2

model bioscrape_generated_model_726668()
  // model units - substance: mole, time: second, volume: litre, area: square_metre, length: metre, extent: mole

  // Compartments:
  compartment default = 1e-6;

  // Species:
  species A in default = 0;
  species C_A in default = 0;
  species C_E in default = 0;
  species C_I in default = 0;
  species C_IE in default = 0;
  species C_R in default = 0;
  species Exc in default = 0;
  species G_E in default = 0.25;
  species G_I in default = 0.5;
  species Int in default = 0;
  species U in default = 0.5;
  species YFP in default = 0;

  // Parameters:
  a_e2 = 0.05;
  a_i = 0.3;
  a_r = 1;
  a_r1 = 0.02;
  a_r2 = 0.02;
  a_s1 = 0.02;
  d_e2 = 0.02;
  d_i = 500;
  d_r = 0.001;
  d_r1 = 0.0007;
  d_r2 = 0.01;
  d_s1 = 10;
  k = 50;
  k_e = 0.3;
  k_exc = 0.05;
  k_i = 0.2;
  k_int = 0.5;

  // Reactions:
  r0: G_I => G_I + Int; k_i*G_I;
  r1: 4 Int + U => C_I; a_i*Int^4*U;
  r2: C_I => 4 Int + U; d_i*C_I;
  r3: C_I => C_A; k_int*C_I;
  r4: C_A => 4 Int + A; a_r*C_A;
  r5: 4 Int + A => C_A; d_r*Int^4*A;
  r6: C_E => C_R; k_exc*C_E;
  r7: C_R => 4 Exc + 4 Int + U; a_r1*C_R;
  r8: 4 Exc + 4 Int + U => C_R; d_r1*Exc^4*Int^4*U;
  r9: Int + Exc => C_IE; a_s1*Int*Exc;
  r10: C_IE => Int + Exc; d_s1*C_IE;
  r11: 4 C_IE + A => C_E; a_e2*C_IE^4*A;
  r12: C_E => 4 C_IE + A; d_e2*C_E;
  r13: 4 C_IE + U => C_R; a_r2*C_IE^4*U;
  r14: C_R => 4 C_IE + U; d_r2*C_R;
  r15: G_E => G_E + Exc; k_e*G_E;
  r16: A => A + YFP; k*A;

  // Unit definitions:
  unit square_metre = metre^2;
end
