// SBML level 3 version 2

model bioscrape_generated_model_861915()
  // model units - substance: mole, time: second, volume: litre, area: square_metre, length: metre, extent: mole

  // Compartments:
  compartment default = 1e-6;

  // Species:
  species A in default = 0;
  species C_A in default = 0;
  species C_E in default = 0;
  species C_I in default = 0;
  species C_R in default = 0;
  species Exc in default = 0;
  species G_E in default = 0.5;
  species G_I in default = 1;
  species Int in default = 0;
  species U in default = 0.5;
  species YFP in default = 0;

  // Parameters:
  a_e1 = 0.05;
  a_i = 0.3;
  a_r = 1;
  a_r1 = 0.02;
  a_s2 = 0.02;
  d_e1 = 0.01;
  d_i = 500;
  d_r = 0.001;
  d_r1 = 0.0007;
  d_s2 = 10;
  k = 50;
  k_e = 0.3;
  k_exc = 0.05;
  k_i = 0.2;
  k_int = 0.5;

  // Reactions:
  r0: G_I => G_I + Int; k_i*G_I;
  r1: 4 Int + U => C_I; a_i*Int^4*U;
  r2: C_I => 4 Int + U; d_i*C_I;
  r3: C_I => C_A; k_int*C_I;
  r4: C_A => 4 Int + A; a_r*C_A;
  r5: 4 Int + A => C_A; d_r*Int^4*A;
  r6: 4 Exc + C_A => C_E; a_e1*Exc^4*C_A;
  r7: C_E => 4 Exc + C_A; d_e1*C_E;
  r8: C_E => C_R; k_exc*C_E;
  r9: C_R => 4 Exc + 4 Int + U; a_r1*C_R;
  r10: 4 Exc + 4 Int + U => C_R; d_r1*Exc^4*Int^4*U;
  r11: 4 Exc + C_I => C_R; a_s2*Exc^4*C_I;
  r12: C_R => 4 Exc + C_I; d_s2*C_R;
  r13: G_E => G_E + Exc; k_e*G_E;
  r14: A => A + YFP; k*A;

  // Unit definitions:
  unit square_metre = metre^2;
end
