// SBML level 3 version 2

model biocrnpyler_845133()
  // model units - substance: mole, time: second, volume: litre, area: square_metre, length: metre, extent: mole

  // Compartments:
  compartment default = 1e-6;

  // Species:
  species G_i in default = 0; G_i is "G_int";
  species P in default = 0; P is "RNAP";
  species T_i in default = 0; T_i is "T_int";
  species Ci_1 in default = 0; Ci_1 is "dna_G_int_protein_RNAP";
  species R in default = 0; R is "Ribo";
  species Int in default = 0;
  species Ci_2 in default = 0; Ci_2 is "protein_Ribo_rna_T_int";
  species U in default = 0; U is "attP_attB";
  species A in default = 0; A is "attL_attR";
  species C_i in default = 0; C_i is "dna_attP_attB_protein_Int_4x";
  species C_a in default = 0; C_a is "dna_attL_attR_protein_Int_4x";
  species Exc in default = 0;
  species C_e in default = 0; C_e is "complex_dna_attL_attR_protein_Int_4x__protein_Exc_4x";
  species C_r in default = 0; C_r is "complex_dna_attP_attB_protein_Int_4x__protein_Exc_4x";
  species C_IE in default = 0; C_IE is "protein_Exc_protein_Int";
  species G_e in default = 0; G_e is "G_exc";
  species T_e in default = 0; T_e is "T_exc";
  species Ce_1 in default = 0; Ce_1 is "dna_G_exc_protein_RNAP";
  species Ce_2 in default = 0; Ce_2 is "protein_Ribo_rna_T_exc";
  species T in default = 0; T is "T_A";
  species dna_attL_attR_protein_RNAP in default = 0;
  species YFP in default = 0;
  species protein_Ribo_rna_T_A in default = 0;
  species Endo in default = 0; Endo is "RNAase";
  species C_ETi in default = 0; C_ETi is "protein_RNAase_rna_T_int";
  species C_ERTi in default = 0; C_ERTi is "complex_protein_Ribo_rna_T_int__protein_RNAase";
  species C_ETe in default = 0; C_ETe is "protein_RNAase_rna_T_exc";
  species C_ERTe in default = 0; C_ERTe is "complex_protein_Ribo_rna_T_exc__protein_RNAase";
  species C_E in default = 0; C_E is "protein_RNAase_rna_T_A";
  species C_RE in default = 0; C_RE is "complex_protein_Ribo_rna_T_A__protein_RNAase";

  // Parameters:
  k_bpi = 100;
  k_upi = 10;
  K_txi = 0.5;
  k_bri = 100;
  k_uri = 10;
  k_tli = 2;
  a_i = 2;
  d_i = 50;
  k_int = 5;
  a_r = 10000;
  d_r = 0.0001;
  a_e1 = 20;
  d_e1 = 5;
  k_exc = 5;
  a_r1 = 10;
  d_r1 = 10000;
  a_s2 = 2;
  d_s2 = 0.5;
  a_s1 = 10;
  d_s1 = 1;
  a_e2 = 50;
  d_e2 = 2;
  a_r2 = 10;
  d_r2 = 1;
  k_bpe = 100;
  k_upe = 10;
  k_txe = 0.5;
  k_bre = 100;
  k_ure = 10;
  k_tle = 2;
  k_bp = 80;
  k_up = 20;
  k_tx = 0.3;
  k_br = 80;
  k_ur = 20;
  k_tl = 1;
  d_bTi = 20;
  d_uTi = 2;
  d_Ti = 0.05;
  d_bRTi = 20;
  d_uRTi = 2;
  d_RTi = 0.05;
  d_bTe = 20;
  d_uTe = 2;
  d_Te = 0.05;
  d_bRTe = 20;
  d_uRTe = 2;
  d_RTe = 0.05;
  d_bT = 20;
  d_uT = 2;
  d_T = 0.05;
  d_bRT = 20;
  d_uRT = 2;
  d_RT = 0.05;

  // Reactions:
  r0: G_i + P => Ci_1; k_bpi*G_i*P;
  r0rev: Ci_1 => G_i + P; k_upi*Ci_1;
  r1: Ci_1 => G_i + T_i + P; K_txi*Ci_1;
  r2: T_i + R => Ci_2; k_bri*T_i*R;
  r2rev: Ci_2 => T_i + R; k_uri*Ci_2;
  r3: Ci_2 => T_i + Int + R; k_tli*Ci_2;
  r4: 4 Int + U => C_i; a_i*Int^4*U;
  r4rev: C_i => 4 Int + U; d_i*C_i;
  r5: C_i => C_a; k_int*C_i;
  r6: C_a => 4 Int + A; a_r*C_a;
  r6rev: 4 Int + A => C_a; d_r*Int^4*A;
  r7: 4 Exc + C_a => C_e; a_e1*Exc^4*C_a;
  r7rev: C_e => 4 Exc + C_a; d_e1*C_e;
  r8: C_e => C_r; k_exc*C_e;
  r9: C_r => 4 Exc + 4 Int + U; a_r1*C_r;
  r9rev: 4 Exc + 4 Int + U => C_r; d_r1*Exc^4*Int^4*U;
  r10: 4 Exc + C_i => C_r; a_s2*Exc^4*C_i;
  r10rev: C_r => 4 Exc + C_i; d_s2*C_r;
  r11: Int + Exc => C_IE; a_s1*Int*Exc;
  r11rev: C_IE => Int + Exc; d_s1*C_IE;
  r12: 4 C_IE + A => C_e; a_e2*C_IE^4*A;
  r12rev: C_e => 4 C_IE + A; d_e2*C_e;
  r13: 4 C_IE + U => C_r; a_r2*C_IE^4*U;
  r13rev: C_r => 4 C_IE + U; d_r2*C_r;
  r14: G_e + P => Ce_1; k_bpe*G_e*P;
  r14rev: Ce_1 => G_e + P; k_upe*Ce_1;
  r15: Ce_1 => G_e + T_e + P; k_txe*Ce_1;
  r16: T_e + R => Ce_2; k_bre*T_e*R;
  r16rev: Ce_2 => T_e + R; k_ure*Ce_2;
  r17: Ce_2 => T_e + Exc + R; k_tle*Ce_2;
  r18: A + P => dna_attL_attR_protein_RNAP; k_bp*A*P;
  r18rev: dna_attL_attR_protein_RNAP => A + P; k_up*dna_attL_attR_protein_RNAP;
  r19: dna_attL_attR_protein_RNAP => A + T + P; k_tx*dna_attL_attR_protein_RNAP;
  r20: T + R => protein_Ribo_rna_T_A; k_br*T*R;
  r20rev: protein_Ribo_rna_T_A => T + R; k_ur*protein_Ribo_rna_T_A;
  r21: protein_Ribo_rna_T_A => T + YFP + R; k_tl*protein_Ribo_rna_T_A;
  r22: T_i + Endo => C_ETi; d_bTi*T_i*Endo;
  r22rev: C_ETi => T_i + Endo; d_uTi*C_ETi;
  r23: C_ETi => Endo; d_Ti*C_ETi;
  r24: Ci_2 + Endo => C_ERTi; d_bRTi*Ci_2*Endo;
  r24rev: C_ERTi => Ci_2 + Endo; d_uRTi*C_ERTi;
  r25: C_ERTi => R + Endo; d_RTi*C_ERTi;
  r26: T_e + Endo => C_ETe; d_bTe*T_e*Endo;
  r26rev: C_ETe => T_e + Endo; d_uTe*C_ETe;
  r27: C_ETe => Endo; d_Te*C_ETe;
  r28: Ce_2 + Endo => C_ERTe; d_bRTe*Ce_2*Endo;
  r28rev: C_ERTe => Ce_2 + Endo; d_uRTe*C_ERTe;
  r29: C_ERTe => R + Endo; d_RTe*C_ERTe;
  r30: T + Endo => C_E; d_bT*T*Endo;
  r30rev: C_E => T + Endo; d_uT*C_E;
  r31: C_E => Endo; d_T*C_E;
  r32: protein_Ribo_rna_T_A + Endo => C_RE; d_bRT*protein_Ribo_rna_T_A*Endo;
  r32rev: C_RE => protein_Ribo_rna_T_A + Endo; d_uRT*C_RE;
  r33: C_RE => R + Endo; d_RT*C_RE;

  // Unit definitions:
  unit square_metre = metre^2;
end
