// SBML level 3 version 2

model biocrnpyler_556474()
  // model units - substance: mole, time: second, volume: litre, area: square_metre, length: metre, extent: mole

  // Compartments:
  compartment default = 1e-6;

  // Species:
  species dna_G_int in default = 0;
  species protein_Int in default = 0;
  species dna_attP_attB in default = 0;
  species dna_attL_attR in default = 0;
  species complex_dna_attP_attB_protein_Int_ in default = 0;
  species complex_dna_attL_attR_protein_Int_ in default = 0;
  species protein_Y in default = 0;

  // Parameters:
  kexpress_P_int_gene_expression = 1;
  a_i__ = 30;
  d_i__ = 0.01;
  k_int__ = 0.1;
  a_r__ = 10;
  d_r__ = 0.01;
  kexpress_P_A_gene_expression = 1;

  // Reactions:
  r0: dna_G_int => dna_G_int + protein_Int; kexpress_P_int_gene_expression*dna_G_int;
  r1: protein_Int + dna_attP_attB => complex_dna_attP_attB_protein_Int_; a_i__*protein_Int*dna_attP_attB;
  r1rev: complex_dna_attP_attB_protein_Int_ => protein_Int + dna_attP_attB; d_i__*complex_dna_attP_attB_protein_Int_;
  r2: complex_dna_attP_attB_protein_Int_ => complex_dna_attL_attR_protein_Int_; k_int__*complex_dna_attP_attB_protein_Int_;
  r3: complex_dna_attL_attR_protein_Int_ => protein_Int + dna_attL_attR; a_r__*complex_dna_attL_attR_protein_Int_;
  r3rev: protein_Int + dna_attL_attR => complex_dna_attL_attR_protein_Int_; d_r__*protein_Int*dna_attL_attR;
  r4: dna_attL_attR => dna_attL_attR + protein_Y; kexpress_P_A_gene_expression*dna_attL_attR;

  // Unit definitions:
  unit square_metre = metre^2;
end
