// SBML level 3 version 2

model biocrnpyler_727200()
  // model units - substance: mole, time: second, volume: litre, area: square_metre, length: metre, extent: mole

  // Compartments:
  compartment default = 1e-6;

  // Species:
  species Int in default = 0;
  species A in default = 0;
  species YFP in default = 0;
  species G_I in default = 0;
  species G_tot in default = 0;

  // Reactions:
  r0: => Int; G_I*k_i;  // modifiers: G_I
    k_i = 0.24;
  r1: => A; G_tot*Int*k_int/(Int + K_I);  // modifiers: Int, G_tot
    k_int = 0.05; K_I = 3335;
  r2: => YFP; A*k;  // modifiers: A
    k = 0.05;

  // Unit definitions:
  unit square_metre = metre^2;
end
