// SBML level 3 version 2

model biocrnpyler_556474()
  // model units - substance: mole, time: second, volume: litre, area: square_metre, length: metre, extent: mole

  // Compartments:
  compartment default = 1e-6;

  // Species:
  species G_I in default = 0; G_I is "G_int";
  species Int in default = 0;
  species U in default = 0; U is "attP_attB";
  species A in default = 0; A is "attL_attR";
  species C_I in default = 0; C_I is "dna_attP_attB_protein_Int";
  species C_A in default = 0; C_A is "dna_attL_attR_protein_Int";
  species YFP in default = 0;

  // Parameters:
  k_i = 1;
  a_i = 30;
  d_i = 0.01;
  k_int = 0.1;
  a_r = 10;
  d_r = 0.01;
  k = 1;

  // Reactions:
  r0: G_I => G_I + Int; k_i*G_I;
  r1: Int + U => C_I; a_i*Int*U;
  r1rev: C_I => Int + U; d_i*C_I;
  r2: C_I => C_A; k_int*C_I;
  r3: C_A => Int + A; a_r*C_A;
  r3rev: Int + A => C_A; d_r*Int*A;
  r4: A => A + YFP; k*A;

  // Unit definitions:
  unit square_metre = metre^2;
end
