// SBML level 3 version 2

model autoreduce_253604()
  // model units - substance: mole, time: second, volume: litre, area: square_metre, length: metre, extent: mole

  // Compartments:
  compartment default = 1;

  // Species:
  species T_I in default = 0;
  species CI_1 in default = 0;
  species Int in default = 0;
  species CI_2 in default = 0;
  species A in default = 0;
  species C_I in default = 0;
  species C_A in default = 0;
  species T in default = 0;
  species C_1 in default = 0;
  species YFP in default = 0;
  species C_2 in default = 0;
  species C_ETi in default = 0;
  species C_ERTi in default = 0;
  species C_E in default = 0;
  species C_ER in default = 0;

  // Parameters:
  k_bpi = 100;
  k_upi = 1;
  k_txi = 0.25;
  k_bri = 100;
  k_uri = 1;
  k_tli = 0.013;
  a_i = 10;
  d_i = 1;
  k_int = 0.1;
  a_r = 0.033;
  d_r = 0.5;
  k_bp = 80;
  k_up = 2;
  k_tx = 0.4;
  k_br = 80;
  k_ur = 2;
  k_tl = 0.05;
  d_bTi = 20;
  d_uTi = 2;
  d_Ti = 0.005;
  d_bRTi = 20;
  d_uRTi = 2;
  d_RTi = 0.005;
  d_bT = 10;
  d_uT = 2;
  d_T = 0.001;
  d_bRT = 10;
  d_uRT = 2;
  d_RT = 0.005;
  Gi_tot = 0;
  P_tot = 0;
  R_tot = 0;
  G_tot = 0;
  E_tot = 0;

  // Reactions:
  r0: => T_I; CI_1*k_txi + CI_2*k_tli + CI_2*k_uri + C_ETi*d_uTi - T_I*d_bTi*(-C_E - C_ER - C_ERTi - C_ETi + E_tot) - T_I*k_bri*(-CI_2 - C_2 - C_ER - C_ERTi + R_tot);  // modifiers: C_2, C_ETi, C_ER, C_E, C_ERTi, CI_1, CI_2
  r1: => CI_1; -CI_1*k_txi - CI_1*k_upi + k_bpi*(-CI_1 + Gi_tot)*(-CI_1 - C_1 + P_tot);  // modifiers: C_1
  r2: => Int; -2*A*Int^2*d_r + CI_2*k_tli + 2*C_A*a_r + 2*C_I*d_i - 2*Int^2*a_i*(-A - C_1 - C_A - C_I + G_tot);  // modifiers: A, C_I, CI_2, C_A, C_1
  r3: => CI_2; -CI_2*d_bRTi*(-C_E - C_ER - C_ERTi - C_ETi + E_tot) - CI_2*k_tli - CI_2*k_uri + C_ERTi*d_uRTi + T_I*k_bri*(-CI_2 - C_2 - C_ER - C_ERTi + R_tot);  // modifiers: C_ERTi, T_I, C_2, C_ETi, C_E, C_ER
  r4: => A; -A*Int^2*d_r - A*k_bp*(-CI_1 - C_1 + P_tot) + C_1*k_tx + C_1*k_up + C_A*a_r;  // modifiers: CI_1, C_A, C_1, Int
  r5: => C_I; -C_I*d_i - C_I*k_int + Int^2*a_i*(-A - C_1 - C_A - C_I + G_tot);  // modifiers: A, C_A, C_1, Int
  r6: => C_A; A*Int^2*d_r - C_A*a_r + C_I*k_int;  // modifiers: A, Int, C_I
  r7: => T; C_1*k_tx + C_2*k_tl + C_2*k_ur + C_E*d_uT - T*d_bT*(-C_E - C_ER - C_ERTi - C_ETi + E_tot) - T*k_br*(-CI_2 - C_2 - C_ER - C_ERTi + R_tot);  // modifiers: C_2, C_ETi, C_ER, C_E, C_ERTi, CI_2, C_1
  r8: => C_1; A*k_bp*(-CI_1 - C_1 + P_tot) - C_1*k_tx - C_1*k_up;  // modifiers: A, CI_1
  r9: => YFP; C_2*k_tl;  // modifiers: C_2
  r10: => C_2; -C_2*d_bRT*(-C_E - C_ER - C_ERTi - C_ETi + E_tot) - C_2*k_tl - C_2*k_ur + C_ER*d_uRT + T*k_br*(-CI_2 - C_2 - C_ER - C_ERTi + R_tot);  // modifiers: C_ERTi, CI_2, T, C_ETi, C_E, C_ER
  r11: => C_ETi; -C_ETi*d_Ti - C_ETi*d_uTi + T_I*d_bTi*(-C_E - C_ER - C_ERTi - C_ETi + E_tot);  // modifiers: C_ERTi, T_I, C_ER, C_E
  r12: => C_ERTi; CI_2*d_bRTi*(-C_E - C_ER - C_ERTi - C_ETi + E_tot) - C_ERTi*d_RTi - C_ERTi*d_uRTi;  // modifiers: CI_2, C_ER, C_ETi, C_E
  r13: => C_E; -C_E*d_T - C_E*d_uT + T*d_bT*(-C_E - C_ER - C_ERTi - C_ETi + E_tot);  // modifiers: C_ERTi, C_ER, T, C_ETi
  r14: => C_ER; C_2*d_bRT*(-C_E - C_ER - C_ERTi - C_ETi + E_tot) - C_ER*d_RT - C_ER*d_uRT;  // modifiers: C_ERTi, C_2, C_ETi, C_E

  // Unit definitions:
  unit square_metre = metre^2;
end
