// SBML level 3 version 2

model biocrnpyler_228536()
  // model units - substance: mole, time: second, volume: litre, area: square_metre, length: metre, extent: mole

  // Compartments:
  compartment default = 1e-6;

  // Species:
  species G_I in default = 0; G_I is "G_int";
  species P in default = 0; P is "RNAP";
  species T_I in default = 0; T_I is "T_int";
  species CI_1 in default = 0; CI_1 is "dna_G_int_protein_RNAP";
  species R in default = 0; R is "Ribo";
  species Int in default = 0;
  species CI_2 in default = 0; CI_2 is "protein_Ribo_rna_T_int";
  species U in default = 0; U is "attP_attB";
  species A in default = 0; A is "attL_attR";
  species C_I in default = 0; C_I is "dna_attP_attB_protein_Int_2x";
  species C_A in default = 0; C_A is "dna_attL_attR_protein_Int_2x";
  species T in default = 0; T is "T_A";
  species dna_attL_attR_protein_RNAP in default = 0;
  species YFP in default = 0;
  species protein_Ribo_rna_T_A in default = 0;
  species Endo in default = 0; Endo is "RNAase";
  species C_ETi in default = 0; C_ETi is "protein_RNAase_rna_T_int";
  species C_ERTi in default = 0; C_ERTi is "complex_protein_Ribo_rna_T_int__protein_RNAase";
  species C_E in default = 0; C_E is "protein_RNAase_rna_T_A";
  species C_ER in default = 0; C_ER is "complex_protein_Ribo_rna_T_A__protein_RNAase";

  // Parameters:
  k_bpi = 100;
  k_upi = 10;
  k_txi = 0.5;
  k_bri = 100;
  k_uri = 10;
  k_tli = 2;
  a_i = 30;
  d_i = 0.01;
  k_int = 0.1;
  a_r = 10;
  d_r = 0.01;
  k_bp = 80;
  k_up = 20;
  k_tx = 0.3;
  k_br = 100;
  k_ur = 10;
  k_tl = 2;
  d_bTi = 20;
  d_uTi = 2;
  d_Ti = 0.05;
  d_bRTi = 20;
  d_uRTi = 2;
  d_RTi = 0.05;
  d_bT = 20;
  d_uT = 2;
  d_T = 0.05;
  d_bRT = 20;
  d_uRT = 2;
  d_RT = 0.05;

  // Reactions:
  r0: G_I + P => CI_1; k_bpi*G_I*P;
  r0rev: CI_1 => G_I + P; k_upi*CI_1;
  r1: CI_1 => G_I + T_I + P; k_txi*CI_1;
  r2: T_I + R => CI_2; k_bri*T_I*R;
  r2rev: CI_2 => T_I + R; k_uri*CI_2;
  r3: CI_2 => T_I + Int + R; k_tli*CI_2;
  r4: 2 Int + U => C_I; a_i*Int^2*U;
  r4rev: C_I => 2 Int + U; d_i*C_I;
  r5: C_I => C_A; k_int*C_I;
  r6: C_A => 2 Int + A; a_r*C_A;
  r6rev: 2 Int + A => C_A; d_r*Int^2*A;
  r7: A + P => dna_attL_attR_protein_RNAP; k_bp*A*P;
  r7rev: dna_attL_attR_protein_RNAP => A + P; k_up*dna_attL_attR_protein_RNAP;
  r8: dna_attL_attR_protein_RNAP => A + T + P; k_tx*dna_attL_attR_protein_RNAP;
  r9: T + R => protein_Ribo_rna_T_A; k_br*T*R;
  r9rev: protein_Ribo_rna_T_A => T + R; k_ur*protein_Ribo_rna_T_A;
  r10: protein_Ribo_rna_T_A => T + YFP + R; k_tl*protein_Ribo_rna_T_A;
  r11: T_I + Endo => C_ETi; d_bTi*T_I*Endo;
  r11rev: C_ETi => T_I + Endo; d_uTi*C_ETi;
  r12: C_ETi => Endo; d_Ti*C_ETi;
  r13: CI_2 + Endo => C_ERTi; d_bRTi*CI_2*Endo;
  r13rev: C_ERTi => CI_2 + Endo; d_uRTi*C_ERTi;
  r14: C_ERTi => R + Endo; d_RTi*C_ERTi;
  r15: T + Endo => C_E; d_bT*T*Endo;
  r15rev: C_E => T + Endo; d_uT*C_E;
  r16: C_E => Endo; d_T*C_E;
  r17: protein_Ribo_rna_T_A + Endo => C_ER; d_bRT*protein_Ribo_rna_T_A*Endo;
  r17rev: C_ER => protein_Ribo_rna_T_A + Endo; d_uRT*C_ER;
  r18: C_ER => R + Endo; d_RT*C_ER;

  // Unit definitions:
  unit square_metre = metre^2;
end
