// SBML level 3 version 2

model biocrnpyler_775069()
  // model units - substance: mole, time: second, volume: litre, area: square_metre, length: metre, extent: mole

  // Compartments:
  compartment default = 1e-6;

  // Species:
  species dna_G_int1 in default = 0;
  species protein_RNAP in default = 0;
  species rna_T_int1 in default = 0;
  species complex_dna_G_int1_protein_RNAP_ in default = 0;
  species protein_Ribo in default = 0;
  species protein_Int1 in default = 0;
  species complex_protein_Ribo_rna_T_int1_ in default = 0;
  species dna_G_int2 in default = 0;
  species rna_T_int2 in default = 0;
  species complex_dna_G_int2_protein_RNAP_ in default = 0;
  species protein_Int2 in default = 0;
  species complex_protein_Ribo_rna_T_int2_ in default = 0;
  species dna_attP_attB_attP_attB_attP_attB in default = 0;
  species dna_attL_attR_attP_attB_attP_attB in default = 0;
  species complex_dna_attP_attB_attP_attB_attP_attB_protein_Int1_2x_ in default = 0;
  species complex_dna_attL_attR_attP_attB_attP_attB_protein_Int1_2x_ in default = 0;
  species dna_attP_attB_attL_attR_attP_attB in default = 0;
  species complex_dna_attP_attB_attP_attB_attP_attB_protein_Int2_2x_ in default = 0;
  species complex_dna_attP_attB_attL_attR_attP_attB_protein_Int2_2x_ in default = 0;
  species protein_Int3 in default = 0;
  species dna_attP_attB_attP_attB_attL_attR in default = 0;
  species complex_dna_attP_attB_attP_attB_attP_attB_protein_Int3_2x_ in default = 0;
  species complex_dna_attP_attB_attP_attB_attL_attR_protein_Int3_2x_ in default = 0;
  species protein_Exc1 in default = 0;
  species complex_complex_dna_attL_attR_attP_attB_attP_attB_protein_Int1_2x__protein_Exc1_4x_ in default = 0;
  species complex_complex_dna_attP_attB_attP_attB_attP_attB_protein_Int1_2x__protein_Exc1_4x_ in default = 0;
  species complex_protein_Exc1_protein_Int1_ in default = 0;
  species protein_Exc2 in default = 0;
  species complex_complex_dna_attP_attB_attL_attR_attP_attB_protein_Int2_2x__protein_Exc2_4x_ in default = 0;
  species complex_complex_dna_attP_attB_attP_attB_attP_attB_protein_Int2_2x__protein_Exc2_4x_ in default = 0;
  species complex_protein_Exc2_protein_Int2_ in default = 0;
  species protein_Exc3 in default = 0;
  species complex_complex_dna_attP_attB_attP_attB_attL_attR_protein_Int3_2x__protein_Exc3_4x_ in default = 0;
  species complex_complex_dna_attP_attB_attP_attB_attP_attB_protein_Int3_2x__protein_Exc3_4x_ in default = 0;
  species complex_protein_Exc3_protein_Int3_ in default = 0;
  species dna_attL_attR_attL_attR_attL_attR in default = 0;
  species rna_T_gfp in default = 0;
  species complex_dna_attL_attR_attL_attR_attL_attR_protein_RNAP_ in default = 0;
  species protein_gfp in default = 0;
  species complex_protein_Ribo_rna_T_gfp_ in default = 0;
  species protein_RNAase in default = 0;
  species complex_protein_RNAase_rna_T_int1_ in default = 0;
  species complex_complex_protein_Ribo_rna_T_int1__protein_RNAase_ in default = 0;
  species complex_protein_RNAase_rna_T_int2_ in default = 0;
  species complex_complex_protein_Ribo_rna_T_int2__protein_RNAase_ in default = 0;
  species complex_protein_RNAase_rna_T_gfp_ in default = 0;
  species complex_complex_protein_Ribo_rna_T_gfp__protein_RNAase_ in default = 0;

  // Parameters:
  kb_P_int1_transcription_mm = 100;
  ku_P_int1_transcription_mm = 1;
  ktx_P_int1_transcription_mm = 0.25;
  kb_RBS1_translation_mm = 100;
  ku_RBS1_translation_mm = 1;
  ktl_RBS1_translation_mm = 0.013;
  kb_P_int2_transcription_mm = 100;
  ku_P_int2_transcription_mm = 1;
  ktx_P_int2_transcription_mm = 0.25;
  kb_RBS2_translation_mm = 80;
  ku_RBS2_translation_mm = 2;
  ktl_RBS2_translation_mm = 0.05;
  a_i__ = 10;
  d_i__ = 1;
  k_int__ = 0.1;
  a_r__ = 0.033;
  d_r__ = 0.5;
  a_e1__ = 20;
  d_e1__ = 5;
  k_exc__ = 5;
  a_r1__ = 10;
  d_r1__ = 10000;
  a_s2__ = 2;
  d_s2__ = 0.5;
  a_s1__ = 10;
  d_s1__ = 1;
  a_e2__ = 50;
  d_e2__ = 2;
  a_r2__ = 10;
  d_r2__ = 1;
  kb_P_A_transcription_mm = 80;
  ku_P_A_transcription_mm = 2;
  ktx_P_A_transcription_mm = 0.4;
  kb_RBS_translation_mm = 100;
  ku_RBS_translation_mm = 1;
  ktl_RBS_translation_mm = 0.013;
  kb_rna_T_int1_rna_degredation_mm = 20;
  ku_rna_T_int1_rna_degredation_mm = 2;
  kdeg_rna_T_int1_rna_degredation_mm = 0.005;
  kb_complex_protein_Ribo_rna_T_int1__rna_degredation_mm = 20;
  ku_complex_protein_Ribo_rna_T_int1__rna_degredation_mm = 2;
  kdeg_complex_protein_Ribo_rna_T_int1__rna_degredation_mm = 0.005;
  kb_rna_T_int2_rna_degredation_mm = 20;
  ku_rna_T_int2_rna_degredation_mm = 2;
  kdeg_rna_T_int2_rna_degredation_mm = 0.005;
  kb_complex_protein_Ribo_rna_T_int2__rna_degredation_mm = 20;
  ku_complex_protein_Ribo_rna_T_int2__rna_degredation_mm = 2;
  kdeg_complex_protein_Ribo_rna_T_int2__rna_degredation_mm = 0.005;
  kb_rna_T_gfp_rna_degredation_mm = 10;
  ku_rna_T_gfp_rna_degredation_mm = 2;
  kdeg_rna_T_gfp_rna_degredation_mm = 0.001;
  kb_complex_protein_Ribo_rna_T_gfp__rna_degredation_mm = 10;
  ku_complex_protein_Ribo_rna_T_gfp__rna_degredation_mm = 2;
  kdeg_complex_protein_Ribo_rna_T_gfp__rna_degredation_mm = 0.005;

  // Reactions:
  r0: dna_G_int1 + protein_RNAP => complex_dna_G_int1_protein_RNAP_; kb_P_int1_transcription_mm*dna_G_int1*protein_RNAP;
  r0rev: complex_dna_G_int1_protein_RNAP_ => dna_G_int1 + protein_RNAP; ku_P_int1_transcription_mm*complex_dna_G_int1_protein_RNAP_;
  r1: complex_dna_G_int1_protein_RNAP_ => dna_G_int1 + rna_T_int1 + protein_RNAP; ktx_P_int1_transcription_mm*complex_dna_G_int1_protein_RNAP_;
  r2: rna_T_int1 + protein_Ribo => complex_protein_Ribo_rna_T_int1_; kb_RBS1_translation_mm*rna_T_int1*protein_Ribo;
  r2rev: complex_protein_Ribo_rna_T_int1_ => rna_T_int1 + protein_Ribo; ku_RBS1_translation_mm*complex_protein_Ribo_rna_T_int1_;
  r3: complex_protein_Ribo_rna_T_int1_ => rna_T_int1 + protein_Int1 + protein_Ribo; ktl_RBS1_translation_mm*complex_protein_Ribo_rna_T_int1_;
  r4: dna_G_int2 + protein_RNAP => complex_dna_G_int2_protein_RNAP_; kb_P_int2_transcription_mm*dna_G_int2*protein_RNAP;
  r4rev: complex_dna_G_int2_protein_RNAP_ => dna_G_int2 + protein_RNAP; ku_P_int2_transcription_mm*complex_dna_G_int2_protein_RNAP_;
  r5: complex_dna_G_int2_protein_RNAP_ => dna_G_int2 + rna_T_int2 + protein_RNAP; ktx_P_int2_transcription_mm*complex_dna_G_int2_protein_RNAP_;
  r6: rna_T_int2 + protein_Ribo => complex_protein_Ribo_rna_T_int2_; kb_RBS2_translation_mm*rna_T_int2*protein_Ribo;
  r6rev: complex_protein_Ribo_rna_T_int2_ => rna_T_int2 + protein_Ribo; ku_RBS2_translation_mm*complex_protein_Ribo_rna_T_int2_;
  r7: complex_protein_Ribo_rna_T_int2_ => rna_T_int2 + protein_Int2 + protein_Ribo; ktl_RBS2_translation_mm*complex_protein_Ribo_rna_T_int2_;
  r8: 2 protein_Int1 + dna_attP_attB_attP_attB_attP_attB => complex_dna_attP_attB_attP_attB_attP_attB_protein_Int1_2x_; a_i__*protein_Int1^2*dna_attP_attB_attP_attB_attP_attB;
  r8rev: complex_dna_attP_attB_attP_attB_attP_attB_protein_Int1_2x_ => 2 protein_Int1 + dna_attP_attB_attP_attB_attP_attB; d_i__*complex_dna_attP_attB_attP_attB_attP_attB_protein_Int1_2x_;
  r9: complex_dna_attP_attB_attP_attB_attP_attB_protein_Int1_2x_ => complex_dna_attL_attR_attP_attB_attP_attB_protein_Int1_2x_; k_int__*complex_dna_attP_attB_attP_attB_attP_attB_protein_Int1_2x_;
  r10: complex_dna_attL_attR_attP_attB_attP_attB_protein_Int1_2x_ => 2 protein_Int1 + dna_attL_attR_attP_attB_attP_attB; a_r__*complex_dna_attL_attR_attP_attB_attP_attB_protein_Int1_2x_;
  r10rev: 2 protein_Int1 + dna_attL_attR_attP_attB_attP_attB => complex_dna_attL_attR_attP_attB_attP_attB_protein_Int1_2x_; d_r__*protein_Int1^2*dna_attL_attR_attP_attB_attP_attB;
  r11: 2 protein_Int2 + dna_attP_attB_attP_attB_attP_attB => complex_dna_attP_attB_attP_attB_attP_attB_protein_Int2_2x_; a_i__*protein_Int2^2*dna_attP_attB_attP_attB_attP_attB;
  r11rev: complex_dna_attP_attB_attP_attB_attP_attB_protein_Int2_2x_ => 2 protein_Int2 + dna_attP_attB_attP_attB_attP_attB; d_i__*complex_dna_attP_attB_attP_attB_attP_attB_protein_Int2_2x_;
  r12: complex_dna_attP_attB_attP_attB_attP_attB_protein_Int2_2x_ => complex_dna_attP_attB_attL_attR_attP_attB_protein_Int2_2x_; k_int__*complex_dna_attP_attB_attP_attB_attP_attB_protein_Int2_2x_;
  r13: complex_dna_attP_attB_attL_attR_attP_attB_protein_Int2_2x_ => 2 protein_Int2 + dna_attP_attB_attL_attR_attP_attB; a_r__*complex_dna_attP_attB_attL_attR_attP_attB_protein_Int2_2x_;
  r13rev: 2 protein_Int2 + dna_attP_attB_attL_attR_attP_attB => complex_dna_attP_attB_attL_attR_attP_attB_protein_Int2_2x_; d_r__*protein_Int2^2*dna_attP_attB_attL_attR_attP_attB;
  r14: 2 protein_Int3 + dna_attP_attB_attP_attB_attP_attB => complex_dna_attP_attB_attP_attB_attP_attB_protein_Int3_2x_; a_i__*protein_Int3^2*dna_attP_attB_attP_attB_attP_attB;
  r14rev: complex_dna_attP_attB_attP_attB_attP_attB_protein_Int3_2x_ => 2 protein_Int3 + dna_attP_attB_attP_attB_attP_attB; d_i__*complex_dna_attP_attB_attP_attB_attP_attB_protein_Int3_2x_;
  r15: complex_dna_attP_attB_attP_attB_attP_attB_protein_Int3_2x_ => complex_dna_attP_attB_attP_attB_attL_attR_protein_Int3_2x_; k_int__*complex_dna_attP_attB_attP_attB_attP_attB_protein_Int3_2x_;
  r16: complex_dna_attP_attB_attP_attB_attL_attR_protein_Int3_2x_ => 2 protein_Int3 + dna_attP_attB_attP_attB_attL_attR; a_r__*complex_dna_attP_attB_attP_attB_attL_attR_protein_Int3_2x_;
  r16rev: 2 protein_Int3 + dna_attP_attB_attP_attB_attL_attR => complex_dna_attP_attB_attP_attB_attL_attR_protein_Int3_2x_; d_r__*protein_Int3^2*dna_attP_attB_attP_attB_attL_attR;
  r17: 4 protein_Exc1 + complex_dna_attL_attR_attP_attB_attP_attB_protein_Int1_2x_ => complex_complex_dna_attL_attR_attP_attB_attP_attB_protein_Int1_2x__protein_Exc1_4x_; a_e1__*protein_Exc1^4*complex_dna_attL_attR_attP_attB_attP_attB_protein_Int1_2x_;
  r17rev: complex_complex_dna_attL_attR_attP_attB_attP_attB_protein_Int1_2x__protein_Exc1_4x_ => 4 protein_Exc1 + complex_dna_attL_attR_attP_attB_attP_attB_protein_Int1_2x_; d_e1__*complex_complex_dna_attL_attR_attP_attB_attP_attB_protein_Int1_2x__protein_Exc1_4x_;
  r18: complex_complex_dna_attL_attR_attP_attB_attP_attB_protein_Int1_2x__protein_Exc1_4x_ => complex_complex_dna_attP_attB_attP_attB_attP_attB_protein_Int1_2x__protein_Exc1_4x_; k_exc__*complex_complex_dna_attL_attR_attP_attB_attP_attB_protein_Int1_2x__protein_Exc1_4x_;
  r19: complex_complex_dna_attP_attB_attP_attB_attP_attB_protein_Int1_2x__protein_Exc1_4x_ => 4 protein_Exc1 + 2 protein_Int1 + dna_attP_attB_attP_attB_attP_attB; a_r1__*complex_complex_dna_attP_attB_attP_attB_attP_attB_protein_Int1_2x__protein_Exc1_4x_;
  r19rev: 4 protein_Exc1 + 2 protein_Int1 + dna_attP_attB_attP_attB_attP_attB => complex_complex_dna_attP_attB_attP_attB_attP_attB_protein_Int1_2x__protein_Exc1_4x_; d_r1__*protein_Exc1^4*protein_Int1^2*dna_attP_attB_attP_attB_attP_attB;
  r20: 4 protein_Exc1 + complex_dna_attP_attB_attP_attB_attP_attB_protein_Int1_2x_ => complex_complex_dna_attP_attB_attP_attB_attP_attB_protein_Int1_2x__protein_Exc1_4x_; a_s2__*protein_Exc1^4*complex_dna_attP_attB_attP_attB_attP_attB_protein_Int1_2x_;
  r20rev: complex_complex_dna_attP_attB_attP_attB_attP_attB_protein_Int1_2x__protein_Exc1_4x_ => 4 protein_Exc1 + complex_dna_attP_attB_attP_attB_attP_attB_protein_Int1_2x_; d_s2__*complex_complex_dna_attP_attB_attP_attB_attP_attB_protein_Int1_2x__protein_Exc1_4x_;
  r21: protein_Int1 + protein_Exc1 => complex_protein_Exc1_protein_Int1_; a_s1__*protein_Int1*protein_Exc1;
  r21rev: complex_protein_Exc1_protein_Int1_ => protein_Int1 + protein_Exc1; d_s1__*complex_protein_Exc1_protein_Int1_;
  r22: 4 complex_protein_Exc1_protein_Int1_ + dna_attL_attR_attP_attB_attP_attB => complex_complex_dna_attL_attR_attP_attB_attP_attB_protein_Int1_2x__protein_Exc1_4x_; a_e2__*complex_protein_Exc1_protein_Int1_^4*dna_attL_attR_attP_attB_attP_attB;
  r22rev: complex_complex_dna_attL_attR_attP_attB_attP_attB_protein_Int1_2x__protein_Exc1_4x_ => 4 complex_protein_Exc1_protein_Int1_ + dna_attL_attR_attP_attB_attP_attB; d_e2__*complex_complex_dna_attL_attR_attP_attB_attP_attB_protein_Int1_2x__protein_Exc1_4x_;
  r23: 4 complex_protein_Exc1_protein_Int1_ + dna_attP_attB_attP_attB_attP_attB => complex_complex_dna_attP_attB_attP_attB_attP_attB_protein_Int1_2x__protein_Exc1_4x_; a_r2__*complex_protein_Exc1_protein_Int1_^4*dna_attP_attB_attP_attB_attP_attB;
  r23rev: complex_complex_dna_attP_attB_attP_attB_attP_attB_protein_Int1_2x__protein_Exc1_4x_ => 4 complex_protein_Exc1_protein_Int1_ + dna_attP_attB_attP_attB_attP_attB; d_r2__*complex_complex_dna_attP_attB_attP_attB_attP_attB_protein_Int1_2x__protein_Exc1_4x_;
  r24: 4 protein_Exc2 + complex_dna_attP_attB_attL_attR_attP_attB_protein_Int2_2x_ => complex_complex_dna_attP_attB_attL_attR_attP_attB_protein_Int2_2x__protein_Exc2_4x_; a_e1__*protein_Exc2^4*complex_dna_attP_attB_attL_attR_attP_attB_protein_Int2_2x_;
  r24rev: complex_complex_dna_attP_attB_attL_attR_attP_attB_protein_Int2_2x__protein_Exc2_4x_ => 4 protein_Exc2 + complex_dna_attP_attB_attL_attR_attP_attB_protein_Int2_2x_; d_e1__*complex_complex_dna_attP_attB_attL_attR_attP_attB_protein_Int2_2x__protein_Exc2_4x_;
  r25: complex_complex_dna_attP_attB_attL_attR_attP_attB_protein_Int2_2x__protein_Exc2_4x_ => complex_complex_dna_attP_attB_attP_attB_attP_attB_protein_Int2_2x__protein_Exc2_4x_; k_exc__*complex_complex_dna_attP_attB_attL_attR_attP_attB_protein_Int2_2x__protein_Exc2_4x_;
  r26: complex_complex_dna_attP_attB_attP_attB_attP_attB_protein_Int2_2x__protein_Exc2_4x_ => 4 protein_Exc2 + 2 protein_Int2 + dna_attP_attB_attP_attB_attP_attB; a_r1__*complex_complex_dna_attP_attB_attP_attB_attP_attB_protein_Int2_2x__protein_Exc2_4x_;
  r26rev: 4 protein_Exc2 + 2 protein_Int2 + dna_attP_attB_attP_attB_attP_attB => complex_complex_dna_attP_attB_attP_attB_attP_attB_protein_Int2_2x__protein_Exc2_4x_; d_r1__*protein_Exc2^4*protein_Int2^2*dna_attP_attB_attP_attB_attP_attB;
  r27: 4 protein_Exc2 + complex_dna_attP_attB_attP_attB_attP_attB_protein_Int2_2x_ => complex_complex_dna_attP_attB_attP_attB_attP_attB_protein_Int2_2x__protein_Exc2_4x_; a_s2__*protein_Exc2^4*complex_dna_attP_attB_attP_attB_attP_attB_protein_Int2_2x_;
  r27rev: complex_complex_dna_attP_attB_attP_attB_attP_attB_protein_Int2_2x__protein_Exc2_4x_ => 4 protein_Exc2 + complex_dna_attP_attB_attP_attB_attP_attB_protein_Int2_2x_; d_s2__*complex_complex_dna_attP_attB_attP_attB_attP_attB_protein_Int2_2x__protein_Exc2_4x_;
  r28: protein_Int2 + protein_Exc2 => complex_protein_Exc2_protein_Int2_; a_s1__*protein_Int2*protein_Exc2;
  r28rev: complex_protein_Exc2_protein_Int2_ => protein_Int2 + protein_Exc2; d_s1__*complex_protein_Exc2_protein_Int2_;
  r29: 4 complex_protein_Exc2_protein_Int2_ + dna_attP_attB_attL_attR_attP_attB => complex_complex_dna_attP_attB_attL_attR_attP_attB_protein_Int2_2x__protein_Exc2_4x_; a_e2__*complex_protein_Exc2_protein_Int2_^4*dna_attP_attB_attL_attR_attP_attB;
  r29rev: complex_complex_dna_attP_attB_attL_attR_attP_attB_protein_Int2_2x__protein_Exc2_4x_ => 4 complex_protein_Exc2_protein_Int2_ + dna_attP_attB_attL_attR_attP_attB; d_e2__*complex_complex_dna_attP_attB_attL_attR_attP_attB_protein_Int2_2x__protein_Exc2_4x_;
  r30: 4 complex_protein_Exc2_protein_Int2_ + dna_attP_attB_attP_attB_attP_attB => complex_complex_dna_attP_attB_attP_attB_attP_attB_protein_Int2_2x__protein_Exc2_4x_; a_r2__*complex_protein_Exc2_protein_Int2_^4*dna_attP_attB_attP_attB_attP_attB;
  r30rev: complex_complex_dna_attP_attB_attP_attB_attP_attB_protein_Int2_2x__protein_Exc2_4x_ => 4 complex_protein_Exc2_protein_Int2_ + dna_attP_attB_attP_attB_attP_attB; d_r2__*complex_complex_dna_attP_attB_attP_attB_attP_attB_protein_Int2_2x__protein_Exc2_4x_;
  r31: 4 protein_Exc3 + complex_dna_attP_attB_attP_attB_attL_attR_protein_Int3_2x_ => complex_complex_dna_attP_attB_attP_attB_attL_attR_protein_Int3_2x__protein_Exc3_4x_; a_e1__*protein_Exc3^4*complex_dna_attP_attB_attP_attB_attL_attR_protein_Int3_2x_;
  r31rev: complex_complex_dna_attP_attB_attP_attB_attL_attR_protein_Int3_2x__protein_Exc3_4x_ => 4 protein_Exc3 + complex_dna_attP_attB_attP_attB_attL_attR_protein_Int3_2x_; d_e1__*complex_complex_dna_attP_attB_attP_attB_attL_attR_protein_Int3_2x__protein_Exc3_4x_;
  r32: complex_complex_dna_attP_attB_attP_attB_attL_attR_protein_Int3_2x__protein_Exc3_4x_ => complex_complex_dna_attP_attB_attP_attB_attP_attB_protein_Int3_2x__protein_Exc3_4x_; k_exc__*complex_complex_dna_attP_attB_attP_attB_attL_attR_protein_Int3_2x__protein_Exc3_4x_;
  r33: complex_complex_dna_attP_attB_attP_attB_attP_attB_protein_Int3_2x__protein_Exc3_4x_ => 4 protein_Exc3 + 2 protein_Int3 + dna_attP_attB_attP_attB_attP_attB; a_r1__*complex_complex_dna_attP_attB_attP_attB_attP_attB_protein_Int3_2x__protein_Exc3_4x_;
  r33rev: 4 protein_Exc3 + 2 protein_Int3 + dna_attP_attB_attP_attB_attP_attB => complex_complex_dna_attP_attB_attP_attB_attP_attB_protein_Int3_2x__protein_Exc3_4x_; d_r1__*protein_Exc3^4*protein_Int3^2*dna_attP_attB_attP_attB_attP_attB;
  r34: 4 protein_Exc3 + complex_dna_attP_attB_attP_attB_attP_attB_protein_Int3_2x_ => complex_complex_dna_attP_attB_attP_attB_attP_attB_protein_Int3_2x__protein_Exc3_4x_; a_s2__*protein_Exc3^4*complex_dna_attP_attB_attP_attB_attP_attB_protein_Int3_2x_;
  r34rev: complex_complex_dna_attP_attB_attP_attB_attP_attB_protein_Int3_2x__protein_Exc3_4x_ => 4 protein_Exc3 + complex_dna_attP_attB_attP_attB_attP_attB_protein_Int3_2x_; d_s2__*complex_complex_dna_attP_attB_attP_attB_attP_attB_protein_Int3_2x__protein_Exc3_4x_;
  r35: protein_Int3 + protein_Exc3 => complex_protein_Exc3_protein_Int3_; a_s1__*protein_Int3*protein_Exc3;
  r35rev: complex_protein_Exc3_protein_Int3_ => protein_Int3 + protein_Exc3; d_s1__*complex_protein_Exc3_protein_Int3_;
  r36: 4 complex_protein_Exc3_protein_Int3_ + dna_attP_attB_attP_attB_attL_attR => complex_complex_dna_attP_attB_attP_attB_attL_attR_protein_Int3_2x__protein_Exc3_4x_; a_e2__*complex_protein_Exc3_protein_Int3_^4*dna_attP_attB_attP_attB_attL_attR;
  r36rev: complex_complex_dna_attP_attB_attP_attB_attL_attR_protein_Int3_2x__protein_Exc3_4x_ => 4 complex_protein_Exc3_protein_Int3_ + dna_attP_attB_attP_attB_attL_attR; d_e2__*complex_complex_dna_attP_attB_attP_attB_attL_attR_protein_Int3_2x__protein_Exc3_4x_;
  r37: 4 complex_protein_Exc3_protein_Int3_ + dna_attP_attB_attP_attB_attP_attB => complex_complex_dna_attP_attB_attP_attB_attP_attB_protein_Int3_2x__protein_Exc3_4x_; a_r2__*complex_protein_Exc3_protein_Int3_^4*dna_attP_attB_attP_attB_attP_attB;
  r37rev: complex_complex_dna_attP_attB_attP_attB_attP_attB_protein_Int3_2x__protein_Exc3_4x_ => 4 complex_protein_Exc3_protein_Int3_ + dna_attP_attB_attP_attB_attP_attB; d_r2__*complex_complex_dna_attP_attB_attP_attB_attP_attB_protein_Int3_2x__protein_Exc3_4x_;
  r38: dna_attL_attR_attL_attR_attL_attR + protein_RNAP => complex_dna_attL_attR_attL_attR_attL_attR_protein_RNAP_; kb_P_A_transcription_mm*dna_attL_attR_attL_attR_attL_attR*protein_RNAP;
  r38rev: complex_dna_attL_attR_attL_attR_attL_attR_protein_RNAP_ => dna_attL_attR_attL_attR_attL_attR + protein_RNAP; ku_P_A_transcription_mm*complex_dna_attL_attR_attL_attR_attL_attR_protein_RNAP_;
  r39: complex_dna_attL_attR_attL_attR_attL_attR_protein_RNAP_ => dna_attL_attR_attL_attR_attL_attR + rna_T_gfp + protein_RNAP; ktx_P_A_transcription_mm*complex_dna_attL_attR_attL_attR_attL_attR_protein_RNAP_;
  r40: rna_T_gfp + protein_Ribo => complex_protein_Ribo_rna_T_gfp_; kb_RBS_translation_mm*rna_T_gfp*protein_Ribo;
  r40rev: complex_protein_Ribo_rna_T_gfp_ => rna_T_gfp + protein_Ribo; ku_RBS_translation_mm*complex_protein_Ribo_rna_T_gfp_;
  r41: complex_protein_Ribo_rna_T_gfp_ => rna_T_gfp + protein_gfp + protein_Ribo; ktl_RBS_translation_mm*complex_protein_Ribo_rna_T_gfp_;
  r42: rna_T_int1 + protein_RNAase => complex_protein_RNAase_rna_T_int1_; kb_rna_T_int1_rna_degredation_mm*rna_T_int1*protein_RNAase;
  r42rev: complex_protein_RNAase_rna_T_int1_ => rna_T_int1 + protein_RNAase; ku_rna_T_int1_rna_degredation_mm*complex_protein_RNAase_rna_T_int1_;
  r43: complex_protein_RNAase_rna_T_int1_ => protein_RNAase; kdeg_rna_T_int1_rna_degredation_mm*complex_protein_RNAase_rna_T_int1_;
  r44: complex_protein_Ribo_rna_T_int1_ + protein_RNAase => complex_complex_protein_Ribo_rna_T_int1__protein_RNAase_; kb_complex_protein_Ribo_rna_T_int1__rna_degredation_mm*complex_protein_Ribo_rna_T_int1_*protein_RNAase;
  r44rev: complex_complex_protein_Ribo_rna_T_int1__protein_RNAase_ => complex_protein_Ribo_rna_T_int1_ + protein_RNAase; ku_complex_protein_Ribo_rna_T_int1__rna_degredation_mm*complex_complex_protein_Ribo_rna_T_int1__protein_RNAase_;
  r45: complex_complex_protein_Ribo_rna_T_int1__protein_RNAase_ => protein_Ribo + protein_RNAase; kdeg_complex_protein_Ribo_rna_T_int1__rna_degredation_mm*complex_complex_protein_Ribo_rna_T_int1__protein_RNAase_;
  r46: rna_T_int2 + protein_RNAase => complex_protein_RNAase_rna_T_int2_; kb_rna_T_int2_rna_degredation_mm*rna_T_int2*protein_RNAase;
  r46rev: complex_protein_RNAase_rna_T_int2_ => rna_T_int2 + protein_RNAase; ku_rna_T_int2_rna_degredation_mm*complex_protein_RNAase_rna_T_int2_;
  r47: complex_protein_RNAase_rna_T_int2_ => protein_RNAase; kdeg_rna_T_int2_rna_degredation_mm*complex_protein_RNAase_rna_T_int2_;
  r48: complex_protein_Ribo_rna_T_int2_ + protein_RNAase => complex_complex_protein_Ribo_rna_T_int2__protein_RNAase_; kb_complex_protein_Ribo_rna_T_int2__rna_degredation_mm*complex_protein_Ribo_rna_T_int2_*protein_RNAase;
  r48rev: complex_complex_protein_Ribo_rna_T_int2__protein_RNAase_ => complex_protein_Ribo_rna_T_int2_ + protein_RNAase; ku_complex_protein_Ribo_rna_T_int2__rna_degredation_mm*complex_complex_protein_Ribo_rna_T_int2__protein_RNAase_;
  r49: complex_complex_protein_Ribo_rna_T_int2__protein_RNAase_ => protein_Ribo + protein_RNAase; kdeg_complex_protein_Ribo_rna_T_int2__rna_degredation_mm*complex_complex_protein_Ribo_rna_T_int2__protein_RNAase_;
  r50: rna_T_gfp + protein_RNAase => complex_protein_RNAase_rna_T_gfp_; kb_rna_T_gfp_rna_degredation_mm*rna_T_gfp*protein_RNAase;
  r50rev: complex_protein_RNAase_rna_T_gfp_ => rna_T_gfp + protein_RNAase; ku_rna_T_gfp_rna_degredation_mm*complex_protein_RNAase_rna_T_gfp_;
  r51: complex_protein_RNAase_rna_T_gfp_ => protein_RNAase; kdeg_rna_T_gfp_rna_degredation_mm*complex_protein_RNAase_rna_T_gfp_;
  r52: complex_protein_Ribo_rna_T_gfp_ + protein_RNAase => complex_complex_protein_Ribo_rna_T_gfp__protein_RNAase_; kb_complex_protein_Ribo_rna_T_gfp__rna_degredation_mm*complex_protein_Ribo_rna_T_gfp_*protein_RNAase;
  r52rev: complex_complex_protein_Ribo_rna_T_gfp__protein_RNAase_ => complex_protein_Ribo_rna_T_gfp_ + protein_RNAase; ku_complex_protein_Ribo_rna_T_gfp__rna_degredation_mm*complex_complex_protein_Ribo_rna_T_gfp__protein_RNAase_;
  r53: complex_complex_protein_Ribo_rna_T_gfp__protein_RNAase_ => protein_Ribo + protein_RNAase; kdeg_complex_protein_Ribo_rna_T_gfp__rna_degredation_mm*complex_complex_protein_Ribo_rna_T_gfp__protein_RNAase_;

  // Unit definitions:
  unit square_metre = metre^2;
end
